<Lems>

    <Target component="sim1"/>

    <Include file="Cells.xml"/>
    <Include file="Networks.xml"/>
    <Include file="Simulation.xml"/>

        <ionChannelHH id="pas" conductance="10pS" type="ionChannelPassive">

            <notes>Single ion channel in NeuroML2 format: passive channel providing a leak conductance </notes>

        </ionChannelHH>

        <cell id="hhcell">

            <notes>Conductance based cell model NeuroML2 format: standard Hodgkin Huxley model cell with Na, K and passive conductances</notes>

            <morphology id="morph1">
                <segment id="0" name="soma">
                    <proximal x="0" y="0" z="0" diameter="17.841242"/> <!--Gives a convenient surface area of 1000.0 um^2-->
                    <distal x="0" y="0" z="0" diameter="17.841242"/>
                </segment>

                <segmentGroup id="soma_group">
                    <member segment="0"/>
                </segmentGroup>

            </morphology>

            <biophysicalProperties id="bioPhys1">

                <membraneProperties>

                    <channelDensity id="leak" ionChannel="pas" condDensity="0.31 mS_per_cm2" erev="-57mV" ion="non_specific"/>
                  <!--  <channelDensity id="naChans" ionChannel="naChan" condDensity="121.0 mS_per_cm2" erev="51 mV" ion="na"/>
                    <channelDensity id="kChans" ionChannel="kChan" condDensity="31 mS_per_cm2" erev="-79mV" ion="k"/>-->

                    <spikeThresh value="-20mV"/>
                    <specificCapacitance value="1.6 uF_per_cm2"/>
                    <initMembPotential value="-70mV"/>

                </membraneProperties>

                <intracellularProperties>
                    <resistivity value="0.03456 kohm_cm"/>   <!-- Note: not used in single compartment simulations -->
                </intracellularProperties>

            </biophysicalProperties>

        </cell>

    <!-- Short small current pulse input & short larger current pulse input
    <pulseGenerator id="pulseGen1" delay="100ms" duration="100ms" amplitude="0.10nA"/>
    <pulseGenerator id="pulseGen2" delay="300ms" duration="100ms" amplitude="0.35nA"/> -->

    <network id="HHCellNetwork">
        <population id="hhpop" component="hhcell" size="2" type="populationList">
            <instance id="0">
                <location x="0" y="20" z="0"/>
            </instance>
            <instance id="1">
                <location x="20" y="10" z="0"/>
            </instance>
          </population>
<!--
        <inputList id="il0" component="pulseGen1" population="hhpop">
            <input id="0" target="../hhpop/0/hhcell" destination="synapses"/>
        </inputList>
      <inputList id="il1" component="pulseGen2" population="hhpop">
          <input id="0" target="../hhpop/1/hhcell" destination="synapses"/>
      </inputList>-->

    </network>

    <Simulation id="sim1" length="450ms" step="0.05ms" target="HHCellNetwork">

        <Display id="d1" title="Hodgkin-Huxley Neuron: V (mV)" timeScale="1ms" xmin="-20" xmax="470" ymin="-90" ymax="50">
            <Line id="V0" quantity="hhpop/0/hhcell/v" scale="1mV" color="#000000" timeScale="1ms"/>
            <Line id="V1" quantity="hhpop/1/hhcell/v" scale="1mV" color="#fff000" timeScale="1ms"/>
        </Display>
        <!--
        <Display id="d2" title="Hodgkin-Huxley Neuron: Gating Variables" timeScale="1ms" xmin="-20" xmax="470" ymin="-0.1" ymax="1.1">
            <Line id="m" quantity="hhpop[0]/bioPhys1/membraneProperties/naChans/naChan/m/q" scale="1"  color="#ff0000" timeScale="1ms"/>
            <Line id="h" quantity="hhpop[0]/bioPhys1/membraneProperties/naChans/naChan/h/q" scale="1"  color="#00dd00" timeScale="1ms"/>
            <Line id="n" quantity="hhpop[0]/bioPhys1/membraneProperties/kChans/kChan/n/q" scale="1"  color="#0000ff" timeScale="1ms"/>
        </Display>

        <Display id="d3" title="Hodgkin-Huxley Neuron: Current" timeScale="1ms" xmin="-20" xmax="470" ymin="-10" ymax="10">
            <Line id="I_na" quantity="hhpop[0]/bioPhys1/membraneProperties/naChans/iDensity" scale="1"  color="#00ffff" timeScale="1ms"/>
            <Line id="I_k" quantity="hhpop[0]/bioPhys1/membraneProperties/kChans/iDensity" scale="1"  color="#ffff00" timeScale="1ms"/>
            <Line id="I_l" quantity="hhpop[0]/bioPhys1/membraneProperties/leak/iDensity" scale="1"  color="#ff00ff" timeScale="1ms"/>
        </Display>

        <Display id="d4" title="Hodgkin-Huxley Neuron: I_inj (nA)" timeScale="1ms" xmin="-20" xmax="470" ymin="-0.01" ymax="0.4">
            <Line id="I_inj1" quantity="hhpop[0]/pulseGen1/i" scale="1nA"  color="#ffffff" timeScale="1ms"/>
            <Line id="I_inj2" quantity="hhpop[0]/pulseGen2/i" scale="1nA"  color="#000000" timeScale="1ms"/>
        </Display>-->

        <!-- Saved the membrane potential to file: hh_v.dat -->
        <OutputFile id="of0" fileName="hh_v.dat">
            <OutputColumn id="v0" quantity="hhpop/0/hhcell/v"/>
            <OutputColumn id="v1" quantity="hhpop/1/hhcell/v"/>
        </OutputFile>

    </Simulation>

</Lems>
