<neuroml xmlns="http://www.neuroml.org/schema/neuroml2"  xmlns:xs="http://www.w3.org/2001/XMLSchema" xmlns:xsi="http://www.w3.org/2001/XMLSchema-instance" xsi:schemaLocation="http://www.neuroml.org/schema/neuroml2 https://raw.github.com/NeuroML/NeuroML2/development/Schemas/NeuroML2/NeuroML_v2.1.xsd" id="HybridTut">
    <notes>NeuroML 2 file exported from NetPyNE v0.9.8</notes>
    <ionChannelHH id="leak_hh" type="ionChannelPassive" conductance="10pS">
        <notes>Single ion channel in NeuroML2 format: passive channel providing a leak conductance </notes>
    </ionChannelHH>
    <ionChannelHH id="na_hh" species="na" conductance="10pS">
        <notes>Single ion channel in NeuroML2 format: standard Sodium channel from the Hodgkin Huxley model</notes>
        <gateHHrates id="m" instances="3">
            <forwardRate type="HHExpLinearRate" rate="1per_ms" midpoint="-40mV" scale="10mV"/>
            <reverseRate type="HHExpRate" rate="4per_ms" midpoint="-65mV" scale="-18mV"/>
        </gateHHrates>
        <gateHHrates id="h" instances="1">
            <forwardRate type="HHExpRate" rate="0.07per_ms" midpoint="-65mV" scale="-20mV"/>
            <reverseRate type="HHSigmoidRate" rate="1per_ms" midpoint="-35mV" scale="10mV"/>
        </gateHHrates>
    </ionChannelHH>
    <ionChannelHH id="k_hh" species="k" conductance="10pS">
        <notes>Single ion channel in NeuroML2 format: standard Potassium channel from the Hodgkin Huxley model</notes>
        <gateHHrates id="n" instances="4">
            <forwardRate type="HHExpLinearRate" rate="0.1per_ms" midpoint="-55mV" scale="10mV"/>
            <reverseRate type="HHExpRate" rate="0.125per_ms" midpoint="-65mV" scale="-80mV"/>
        </gateHHrates>
    </ionChannelHH>
    <expOneSynapse id="AMPA" gbase="1uS" erev="0mV" tauDecay="0.1ms"/>
    <cell id="CELL_HH_PYR">
        <notes>Cell exported from NetPyNE:
{'conds': {'cellType': 'PYR', 'cellModel': 'HH'}, 'secs': {'soma': {'geom': {'diam': 6.3, 'L': 5, 'Ra': 123.0, 'pt3d': [(0, 0, 0, 20), (0, 0, 20, 20)]}, 'topol': {}, 'mechs': {'hh': {'gnabar': 0.12, 'gkbar': 0.036, 'gl': 0.003, 'el': -70}}}, 'dend': {'geom': {'diam': 5.0, 'L': 150.0, 'Ra': 150.0, 'cm': 1, 'pt3d': []}, 'topol': {'parentSec': 'soma', 'parentX': 1.0, 'childX': 0}, 'mechs': {'pas': {'g': 3.57e-05, 'e': -70}}}}}</notes>
        <morphology id="morph_CELL_HH_PYR">
            <segment id="0" name="soma">
                <proximal x="0.000000e+00" y="0.000000e+00" z="0.000000e+00" diameter="20.0"/>
                <distal x="0.000000e+00" y="0.000000e+00" z="2.000000e+01" diameter="20.0"/>
            </segment>
            <segment id="1" name="dend">
                <parent segment="0"/>
                <distal x="0.000000e+00" y="1.500000e+02" z="0.000000e+00" diameter="5.0"/>
            </segment>
            <segmentGroup neuroLexId="sao864921383" id="soma_SECTION">
                <member segment="0"/>
            </segmentGroup>
            <segmentGroup id="soma_group">
                <include segmentGroup="soma_SECTION"/>
            </segmentGroup>
            <segmentGroup neuroLexId="sao864921383" id="dend_SECTION">
                <member segment="1"/>
            </segmentGroup>
            <segmentGroup id="dend_group">
                <include segmentGroup="dend_SECTION"/>
            </segmentGroup>
        </morphology>
        <biophysicalProperties id="biophys_CELL_HH_PYR">
            <membraneProperties>
                <channelDensity id="leak_soma_group" ionChannel="leak_hh" condDensity="0.003 S_per_cm2" erev="-70 mV" ion="non_specific"/>
                <channelDensity id="k_soma_group" ionChannel="k_hh" condDensity="0.036 S_per_cm2" erev="-77 mV" ion="k"/>
                <channelDensity id="na_soma_group" ionChannel="na_hh" condDensity="0.12 S_per_cm2" erev="50 mV" ion="na"/>
                <channelDensity id="leak_dend_group" ionChannel="leak_hh" condDensity="3.57e-05 mS_per_cm2" erev="-70 mV" ion="non_specific"/>
                <spikeThresh value="10 mV"/>
                <spikeThresh value="10 mV"/>
                <specificCapacitance value="1 uF_per_cm2" segmentGroup="soma_group"/>
                <specificCapacitance value="1 uF_per_cm2" segmentGroup="dend_group"/>
                <initMembPotential value="-65 mV"/>
                <initMembPotential value="-65 mV"/>
            </membraneProperties>
            <intracellularProperties>
                <resistivity value="123.0 ohm_cm" segmentGroup="soma_group"/>
                <resistivity value="150.0 ohm_cm" segmentGroup="dend_group"/>
            </intracellularProperties>
        </biophysicalProperties>
    </cell>
    <izhikevich2007Cell id="CELL_Izhi_PYR" C="100 pF" v0="-60 mV" k="0.7 nS_per_mV" vr="-60 mV" vt="-40 mV" vpeak="35 mV" a="0.03 per_ms" b="-2 nS" c="-50 mV" d="100 pA"/>
    <spikeGeneratorPoisson id="NetStim_bkg_PYR_HH_10_1_AMPA" averageRate="10 Hz"/>
    <spikeGeneratorPoisson id="NetStim_bkg_PYR_Izhi_10_1_AMPA" averageRate="10 Hz"/>
    <network id="HybridTut">
        <population id="PYR_HH" component="CELL_HH_PYR" size="50" type="populationList">
            <property tag="radius" value="5"/>
            <instance id="0">
                <location x="80.394960618485939" y="3.438118285630337" z="73.926470621040451"/>
            </instance>
            <instance id="1">
                <location x="46.746148134873678" y="59.328198582090387" z="68.976682455051531"/>
            </instance>
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        </population>
        <population id="PYR_Izhi" component="CELL_Izhi_PYR" size="50" type="populationList">
            <property tag="radius" value="5"/>
            <instance id="0">
                <location x="91.784059095246704" y="94.948500768526344" z="30.753281519107222"/>
            </instance>
            <instance id="1">
                <location x="78.939196332604809" y="19.382483135121294" z="80.689779370862581"/>
            </instance>
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        </population>
        <population id="Pop_NetStim_bkg_PYR_HH_10_1_AMPA" component="NetStim_bkg_PYR_HH_10_1_AMPA" size="50"/>
        <population id="Pop_NetStim_bkg_PYR_Izhi_10_1_AMPA" component="NetStim_bkg_PYR_Izhi_10_1_AMPA" size="50"/>
        <projection id="NetConn_PYR_Izhi_PYR_HH_AMPA" presynapticPopulation="PYR_Izhi" postsynapticPopulation="PYR_HH" synapse="AMPA">
            <connectionWD id="0" preCellId="../PYR_Izhi/25/CELL_Izhi_PYR" postCellId="../PYR_HH/0/CELL_HH_PYR" weight="0.2" delay="14.000931752936935 ms"/>
            <connectionWD id="1" preCellId="../PYR_Izhi/42/CELL_Izhi_PYR" postCellId="../PYR_HH/1/CELL_HH_PYR" weight="0.2" delay="11.325202553525855 ms"/>
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        </projection>
        <projection id="NetConn_PYR_HH_PYR_HH_AMPA" presynapticPopulation="PYR_HH" postsynapticPopulation="PYR_HH" synapse="AMPA">
            <connectionWD id="0" preCellId="../PYR_HH/9/CELL_HH_PYR" postCellId="../PYR_HH/2/CELL_HH_PYR" weight="0.2" delay="13.721814216950975 ms"/>
            <connectionWD id="1" preCellId="../PYR_HH/34/CELL_HH_PYR" postCellId="../PYR_HH/3/CELL_HH_PYR" weight="0.2" delay="15.078576990686033 ms"/>
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        </projection>
        <projection id="NetConn_PYR_HH_PYR_Izhi_AMPA" presynapticPopulation="PYR_HH" postsynapticPopulation="PYR_Izhi" synapse="AMPA">
            <connectionWD id="0" preCellId="../PYR_HH/17/CELL_HH_PYR" postCellId="../PYR_Izhi/0/CELL_Izhi_PYR" weight="0.2" delay="14.171074322026808 ms"/>
            <connectionWD id="1" preCellId="../PYR_HH/1/CELL_HH_PYR" postCellId="../PYR_Izhi/1/CELL_Izhi_PYR" weight="0.2" delay="12.025762395440816 ms"/>
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        </projection>
        <projection id="NetConn_PYR_Izhi_PYR_Izhi_AMPA" presynapticPopulation="PYR_Izhi" postsynapticPopulation="PYR_Izhi" synapse="AMPA">
            <connectionWD id="0" preCellId="../PYR_Izhi/29/CELL_Izhi_PYR" postCellId="../PYR_Izhi/0/CELL_Izhi_PYR" weight="0.2" delay="13.100389815879364 ms"/>
            <connectionWD id="1" preCellId="../PYR_Izhi/34/CELL_Izhi_PYR" postCellId="../PYR_Izhi/0/CELL_Izhi_PYR" weight="0.2" delay="11.248916978396812 ms"/>
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        </projection>
        <projection id="NetConn_NetStim_bkg_PYR_HH_10_1_AMPA__PYR_HH" presynapticPopulation="Pop_NetStim_bkg_PYR_HH_10_1_AMPA" postsynapticPopulation="PYR_HH" synapse="AMPA">
            <connectionWD id="0" preCellId="../Pop_NetStim_bkg_PYR_HH_10_1_AMPA[0]" postCellId="../PYR_HH/0/CELL_HH_PYR" weight="1." delay="2.941726813572057 ms"/>
            <connectionWD id="1" preCellId="../Pop_NetStim_bkg_PYR_HH_10_1_AMPA[1]" postCellId="../PYR_HH/1/CELL_HH_PYR" weight="1." delay="4.7799932519486195 ms"/>
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        </projection>
        <projection id="NetConn_NetStim_bkg_PYR_Izhi_10_1_AMPA__PYR_Izhi" presynapticPopulation="Pop_NetStim_bkg_PYR_Izhi_10_1_AMPA" postsynapticPopulation="PYR_Izhi" synapse="AMPA">
            <connectionWD id="0" preCellId="../Pop_NetStim_bkg_PYR_Izhi_10_1_AMPA[0]" postCellId="../PYR_Izhi/0/CELL_Izhi_PYR" weight="1." delay="1.5989354093095902 ms"/>
            <connectionWD id="1" preCellId="../Pop_NetStim_bkg_PYR_Izhi_10_1_AMPA[1]" postCellId="../PYR_Izhi/1/CELL_Izhi_PYR" weight="1." delay="2.618936877320768 ms"/>
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        </projection>
    </network>
</neuroml>
