<neuroml xmlns="http://www.neuroml.org/schema/neuroml2"  xmlns:xs="http://www.w3.org/2001/XMLSchema" xmlns:xsi="http://www.w3.org/2001/XMLSchema-instance" xsi:schemaLocation="http://www.neuroml.org/schema/neuroml2 https://raw.github.com/NeuroML/NeuroML2/development/Schemas/NeuroML2/NeuroML_v2beta5.xsd" id="M1">
    <notes>NeuroML 2 file exported from NetPyNE v0.5.8</notes>
    <expTwoSynapse id="AMPA" gbase="1uS" erev="0mV" tauDecay="5.3ms" tauRise="0.05ms"/>
    <expTwoSynapse id="NMDA" gbase="1uS" erev="0mV" tauDecay="15ms" tauRise="0.15ms"/>
    <expTwoSynapse id="GABAA" gbase="1uS" erev="-80mV" tauDecay="9.1ms" tauRise="0.07ms"/>
    <expTwoSynapse id="GABAB" gbase="1uS" erev="-80mV" tauDecay="9.1ms" tauRise="0.07ms"/>
    <izhikevich2007Cell id="CELL_Izhi2007b_IT" C="100 pF" v0="-60 mV" k="0.7 nS_per_mV" vr="-60 mV" vt="-40 mV" vpeak="35 mV" a="0.03 per_ms" b="-2 nS" c="-50 mV" d="100 pA"/>
    <izhikevich2007Cell id="CELL_Izhi2007b_PT" C="150.0 pF" v0="-75 mV" k="1.2 nS_per_mV" vr="-75 mV" vt="-45 mV" vpeak="50 mV" a="0.01 per_ms" b="5 nS" c="-56 mV" d="130 pA"/>
    <izhikevich2007Cell id="CELL_Izhi2007b_CT" C="100 pF" v0="-60 mV" k="0.7 nS_per_mV" vr="-60 mV" vt="-40 mV" vpeak="35 mV" a="0.03 per_ms" b="-2 nS" c="-50 mV" d="100 pA"/>
    <izhikevich2007Cell id="CELL_Izhi2007b_SOM" C="100.0 pF" v0="-56 mV" k="1.0 nS_per_mV" vr="-56 mV" vt="-42 mV" vpeak="40 mV" a="0.03 per_ms" b="8 nS" c="-53 mV" d="20 pA"/>
    <izhikevich2007Cell id="CELL_Izhi2007b_PV" C="20.0 pF" v0="-55 mV" k="1.0 nS_per_mV" vr="-55 mV" vt="-40 mV" vpeak="25 mV" a="0.2 per_ms" b="-2 nS" c="-45 mV" d="-55 pA"/>
    <spikeGeneratorPoisson id="NetStim_background_E_IT_L6_20_1_NMDA" averageRate="20 Hz"/>
    <spikeGeneratorPoisson id="NetStim_background_I_PV_L6_20_1_NMDA" averageRate="20 Hz"/>
    <spikeGeneratorPoisson id="NetStim_background_E_IT_L5B_20_1_NMDA" averageRate="20 Hz"/>
    <spikeGeneratorPoisson id="NetStim_background_I_SOM_L23_20_1_NMDA" averageRate="20 Hz"/>
    <spikeGeneratorPoisson id="NetStim_background_E_PT_L5B_20_1_NMDA" averageRate="20 Hz"/>
    <spikeGeneratorPoisson id="NetStim_background_E_IT_L4_20_1_NMDA" averageRate="20 Hz"/>
    <spikeGeneratorPoisson id="NetStim_background_I_PV_L23_20_1_NMDA" averageRate="20 Hz"/>
    <spikeGeneratorPoisson id="NetStim_background_I_SOM_L6_20_1_NMDA" averageRate="20 Hz"/>
    <spikeGeneratorPoisson id="NetStim_background_E_CT_L6_20_1_NMDA" averageRate="20 Hz"/>
    <spikeGeneratorPoisson id="NetStim_background_E_IT_L23_20_1_NMDA" averageRate="20 Hz"/>
    <spikeGeneratorPoisson id="NetStim_background_I_SOM_L5_20_1_NMDA" averageRate="20 Hz"/>
    <spikeGeneratorPoisson id="NetStim_background_E_IT_L5A_20_1_NMDA" averageRate="20 Hz"/>
    <spikeGeneratorPoisson id="NetStim_background_I_PV_L5_20_1_NMDA" averageRate="20 Hz"/>
    <network id="M1">
        <population id="IT_L23" component="CELL_Izhi2007b_IT" size="51" type="populationList">
            <instance id="0">
                <location x="40.776610383388785" y="328.471943786871407" z="7.731198475902096"/>
            </instance>
            <instance id="1">
                <location x="6.022194954686372" y="293.138157473836316" z="22.39576168312335"/>
            </instance>
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        </population>
        <population id="IT_L4" component="CELL_Izhi2007b_IT" size="26" type="populationList">
            <instance id="0">
                <location x="41.361956922620301" y="479.660247919129347" z="27.039553012177421"/>
            </instance>
            <instance id="1">
                <location x="38.88649574417785" y="492.710068959382625" z="8.77953882413215"/>
            </instance>
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        </population>
        <population id="IT_L5A" component="CELL_Izhi2007b_IT" size="29" type="populationList">
            <instance id="0">
                <location x="32.145463061679287" y="599.143574173536877" z="34.437312139072127"/>
            </instance>
            <instance id="1">
                <location x="17.398711243878985" y="660.948379193467076" z="17.675770188884133"/>
            </instance>
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        </population>
        <population id="IT_L5B" component="CELL_Izhi2007b_IT" size="33" type="populationList">
            <instance id="0">
                <location x="9.730522545353381" y="828.151734544686292" z="7.526073899498797"/>
            </instance>
            <instance id="1">
                <location x="23.325455020939607" y="782.159184667170962" z="11.738542506360773"/>
            </instance>
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        </population>
        <population id="PT_L5B" component="CELL_Izhi2007b_PT" size="33" type="populationList">
            <instance id="0">
                <location x="8.234890522730803" y="801.528198214096506" z="49.884292491059576"/>
            </instance>
            <instance id="1">
                <location x="10.143452362770395" y="947.132366426444264" z="23.891271231599433"/>
            </instance>
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        </population>
        <population id="IT_L6" component="CELL_Izhi2007b_IT" size="31" type="populationList">
            <instance id="0">
                <location x="25.092219546943507" y="1344.656588358200224" z="37.036590406050728"/>
            </instance>
            <instance id="1">
                <location x="36.869268909957377" y="1111.161329786244323" z="7.846477173444305"/>
            </instance>
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        </population>
        <population id="CT_L6" component="CELL_Izhi2007b_CT" size="31" type="populationList">
            <instance id="0">
                <location x="29.763811471755258" y="1149.822417242108259" z="24.028185966046507"/>
            </instance>
            <instance id="1">
                <location x="16.480477704934671" y="1254.178833872666701" z="1.116325454307504"/>
            </instance>
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        </population>
        <population id="PV_L23" component="CELL_Izhi2007b_PV" size="7" type="populationList">
            <instance id="0">
                <location x="15.576895357358007" y="163.407056345179541" z="45.431824807038467"/>
            </instance>
            <instance id="1">
                <location x="38.320074814817836" y="209.265185725817275" z="9.302916384863652"/>
            </instance>
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        </population>
        <population id="SOM_L23" component="CELL_Izhi2007b_SOM" size="7" type="populationList">
            <instance id="0">
                <location x="38.87788975905935" y="332.00501391547192" z="19.896563845012949"/>
            </instance>
            <instance id="1">
                <location x="37.041989767082988" y="350.119382600149834" z="5.972816549122157"/>
            </instance>
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        </population>
        <population id="PV_L5" component="CELL_Izhi2007b_PV" size="15" type="populationList">
            <instance id="0">
                <location x="46.206746813725928" y="812.578244140973197" z="15.975920498785651"/>
            </instance>
            <instance id="1">
                <location x="28.032536022042741" y="627.17800312347515" z="42.149105471724738"/>
            </instance>
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        </population>
        <population id="SOM_L5" component="CELL_Izhi2007b_SOM" size="15" type="populationList">
            <instance id="0">
                <location x="27.931080763908788" y="1005.786619173956637" z="36.384892747883164"/>
            </instance>
            <instance id="1">
                <location x="46.619817111522323" y="925.225786291036457" z="7.263414403087603"/>
            </instance>
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        </population>
        <population id="PV_L6" component="CELL_Izhi2007b_PV" size="7" type="populationList">
            <instance id="0">
                <location x="2.374384226535859" y="1149.910988196392736" z="48.228525350728304"/>
            </instance>
            <instance id="1">
                <location x="15.752028751087559" y="1272.229043512787484" z="0.536667704522298"/>
            </instance>
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        </population>
        <population id="SOM_L6" component="CELL_Izhi2007b_SOM" size="7" type="populationList">
            <instance id="0">
                <location x="15.722322139879951" y="1041.044285773876027" z="46.655816133633216"/>
            </instance>
            <instance id="1">
                <location x="11.278597739286417" y="1154.383381431884118" z="40.407899118709835"/>
            </instance>
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        </population>
        <population id="Pop_NetStim_background_E_IT_L6_20_1_NMDA" component="NetStim_background_E_IT_L6_20_1_NMDA" size="31"/>
        <population id="Pop_NetStim_background_I_PV_L6_20_1_NMDA" component="NetStim_background_I_PV_L6_20_1_NMDA" size="7"/>
        <population id="Pop_NetStim_background_E_IT_L5B_20_1_NMDA" component="NetStim_background_E_IT_L5B_20_1_NMDA" size="33"/>
        <population id="Pop_NetStim_background_I_SOM_L23_20_1_NMDA" component="NetStim_background_I_SOM_L23_20_1_NMDA" size="7"/>
        <population id="Pop_NetStim_background_E_PT_L5B_20_1_NMDA" component="NetStim_background_E_PT_L5B_20_1_NMDA" size="33"/>
        <population id="Pop_NetStim_background_E_IT_L4_20_1_NMDA" component="NetStim_background_E_IT_L4_20_1_NMDA" size="26"/>
        <population id="Pop_NetStim_background_I_PV_L23_20_1_NMDA" component="NetStim_background_I_PV_L23_20_1_NMDA" size="7"/>
        <population id="Pop_NetStim_background_I_SOM_L6_20_1_NMDA" component="NetStim_background_I_SOM_L6_20_1_NMDA" size="7"/>
        <population id="Pop_NetStim_background_E_CT_L6_20_1_NMDA" component="NetStim_background_E_CT_L6_20_1_NMDA" size="31"/>
        <population id="Pop_NetStim_background_E_IT_L23_20_1_NMDA" component="NetStim_background_E_IT_L23_20_1_NMDA" size="51"/>
        <population id="Pop_NetStim_background_I_SOM_L5_20_1_NMDA" component="NetStim_background_I_SOM_L5_20_1_NMDA" size="15"/>
        <population id="Pop_NetStim_background_E_IT_L5A_20_1_NMDA" component="NetStim_background_E_IT_L5A_20_1_NMDA" size="29"/>
        <population id="Pop_NetStim_background_I_PV_L5_20_1_NMDA" component="NetStim_background_I_PV_L5_20_1_NMDA" size="15"/>
        <projection id="NetConn_IT_L23_PV_L5_AMPA" presynapticPopulation="IT_L23" postsynapticPopulation="PV_L5" synapse="AMPA">
            <connectionWD id="0" preCellId="../IT_L23/7/CELL_Izhi2007b_IT" postCellId="../PV_L5/1/CELL_Izhi2007b_PV" weight="0.0055" delay="4.55300459436 ms"/>
            <connectionWD id="1" preCellId="../IT_L23/39/CELL_Izhi2007b_IT" postCellId="../PV_L5/1/CELL_Izhi2007b_PV" weight="0.0055" delay="5.90171635219 ms"/>
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        </projection>
        <projection id="NetConn_IT_L5B_SOM_L5_AMPA" presynapticPopulation="IT_L5B" postsynapticPopulation="SOM_L5" synapse="AMPA">
            <connectionWD id="0" preCellId="../IT_L5B/19/CELL_Izhi2007b_IT" postCellId="../SOM_L5/0/CELL_Izhi2007b_SOM" weight="0.006125" delay="2.80369789333 ms"/>
            <connectionWD id="1" preCellId="../IT_L5B/31/CELL_Izhi2007b_IT" postCellId="../SOM_L5/0/CELL_Izhi2007b_SOM" weight="0.006125" delay="3.8646070071 ms"/>
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        </projection>
        <projection id="NetConn_SOM_L6_SOM_L6_GABAB" presynapticPopulation="SOM_L6" postsynapticPopulation="SOM_L6" synapse="GABAB">
            <connectionWD id="0" preCellId="../SOM_L6/5/CELL_Izhi2007b_SOM" postCellId="../SOM_L6/0/CELL_Izhi2007b_SOM" weight="0.025" delay="2.44530325727 ms"/>
            <connectionWD id="1" preCellId="../SOM_L6/4/CELL_Izhi2007b_SOM" postCellId="../SOM_L6/1/CELL_Izhi2007b_SOM" weight="0.025" delay="3.20139967341 ms"/>
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        </projection>
        <projection id="NetConn_CT_L6_CT_L6_AMPA" presynapticPopulation="CT_L6" postsynapticPopulation="CT_L6" synapse="AMPA">
            <connectionWD id="0" preCellId="../CT_L6/8/CELL_Izhi2007b_CT" postCellId="../CT_L6/0/CELL_Izhi2007b_CT" weight="0.0265" delay="2.85657631047 ms"/>
            <connectionWD id="1" preCellId="../CT_L6/12/CELL_Izhi2007b_CT" postCellId="../CT_L6/2/CELL_Izhi2007b_CT" weight="0.0265" delay="3.35640767705 ms"/>
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        </projection>
        <projection id="NetConn_SOM_L23_IT_L23_GABAB" presynapticPopulation="SOM_L23" postsynapticPopulation="IT_L23" synapse="GABAB">
            <connectionWD id="0" preCellId="../SOM_L23/0/CELL_Izhi2007b_SOM" postCellId="../IT_L23/0/CELL_Izhi2007b_IT" weight="0.025" delay="2.12809521424 ms"/>
            <connectionWD id="1" preCellId="../SOM_L23/1/CELL_Izhi2007b_SOM" postCellId="../IT_L23/0/CELL_Izhi2007b_IT" weight="0.025" delay="2.22037488635 ms"/>
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        </projection>
        <projection id="NetConn_IT_L5B_CT_L6_AMPA" presynapticPopulation="IT_L5B" postsynapticPopulation="CT_L6" synapse="AMPA">
            <connectionWD id="0" preCellId="../IT_L5B/3/CELL_Izhi2007b_IT" postCellId="../CT_L6/3/CELL_Izhi2007b_CT" weight="0.0245" delay="3.93723193395 ms"/>
            <connectionWD id="1" preCellId="../IT_L5B/28/CELL_Izhi2007b_IT" postCellId="../CT_L6/6/CELL_Izhi2007b_CT" weight="0.0245" delay="3.70126587792 ms"/>
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        </projection>
        <projection id="NetConn_IT_L6_SOM_L5_AMPA" presynapticPopulation="IT_L6" postsynapticPopulation="SOM_L5" synapse="AMPA">
            <connectionWD id="0" preCellId="../IT_L6/6/CELL_Izhi2007b_IT" postCellId="../SOM_L5/0/CELL_Izhi2007b_SOM" weight="0.012393" delay="2.73717435404 ms"/>
            <connectionWD id="1" preCellId="../IT_L6/4/CELL_Izhi2007b_IT" postCellId="../SOM_L5/2/CELL_Izhi2007b_SOM" weight="0.012393" delay="8.52926860735 ms"/>
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        </projection>
        <projection id="NetConn_IT_L4_PT_L5B_AMPA" presynapticPopulation="IT_L4" postsynapticPopulation="PT_L5B" synapse="AMPA">
            <connectionWD id="0" preCellId="../IT_L4/13/CELL_Izhi2007b_IT" postCellId="../PT_L5B/1/CELL_Izhi2007b_PT" weight="0.044" delay="6.79389470689 ms"/>
            <connectionWD id="1" preCellId="../IT_L4/18/CELL_Izhi2007b_IT" postCellId="../PT_L5B/9/CELL_Izhi2007b_PT" weight="0.044" delay="4.6431410419 ms"/>
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        </projection>
        <projection id="NetConn_IT_L5A_IT_L23_AMPA" presynapticPopulation="IT_L5A" postsynapticPopulation="IT_L23" synapse="AMPA">
            <connectionWD id="0" preCellId="../IT_L5A/0/CELL_Izhi2007b_IT" postCellId="../IT_L23/0/CELL_Izhi2007b_IT" weight="0.0335" delay="4.72122848558 ms"/>
            <connectionWD id="1" preCellId="../IT_L5A/10/CELL_Izhi2007b_IT" postCellId="../IT_L23/1/CELL_Izhi2007b_IT" weight="0.0335" delay="4.66537378524 ms"/>
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        </projection>
        <projection id="NetConn_IT_L4_IT_L5B_AMPA" presynapticPopulation="IT_L4" postsynapticPopulation="IT_L5B" synapse="AMPA">
            <connectionWD id="0" preCellId="../IT_L4/16/CELL_Izhi2007b_IT" postCellId="../IT_L5B/0/CELL_Izhi2007b_IT" weight="0.044" delay="5.67250349962 ms"/>
            <connectionWD id="1" preCellId="../IT_L4/21/CELL_Izhi2007b_IT" postCellId="../IT_L5B/1/CELL_Izhi2007b_IT" weight="0.044" delay="4.42697061437 ms"/>
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        </projection>
        <projection id="NetConn_PT_L5B_IT_L5B_AMPA" presynapticPopulation="PT_L5B" postsynapticPopulation="IT_L5B" synapse="AMPA">
            <connectionWD id="0" preCellId="../PT_L5B/16/CELL_Izhi2007b_PT" postCellId="../IT_L5B/1/CELL_Izhi2007b_IT" weight="0.0355" delay="2.56292026094 ms"/>
            <connectionWD id="1" preCellId="../PT_L5B/2/CELL_Izhi2007b_PT" postCellId="../IT_L5B/2/CELL_Izhi2007b_IT" weight="0.0355" delay="2.11079439664 ms"/>
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        </projection>
        <projection id="NetConn_PV_L5_SOM_L5_GABAA" presynapticPopulation="PV_L5" postsynapticPopulation="SOM_L5" synapse="GABAA">
            <connectionWD id="0" preCellId="../PV_L5/12/CELL_Izhi2007b_PV" postCellId="../SOM_L5/0/CELL_Izhi2007b_SOM" weight="0.025" delay="2.34876667973 ms"/>
            <connectionWD id="1" preCellId="../PV_L5/2/CELL_Izhi2007b_PV" postCellId="../SOM_L5/0/CELL_Izhi2007b_SOM" weight="0.025" delay="2.14176729305 ms"/>
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        </projection>
        <projection id="NetConn_PV_L5_PT_L5B_GABAA" presynapticPopulation="PV_L5" postsynapticPopulation="PT_L5B" synapse="GABAA">
            <connectionWD id="0" preCellId="../PV_L5/8/CELL_Izhi2007b_PV" postCellId="../PT_L5B/0/CELL_Izhi2007b_PT" weight="0.025" delay="4.56095848445 ms"/>
            <connectionWD id="1" preCellId="../PV_L5/0/CELL_Izhi2007b_PV" postCellId="../PT_L5B/0/CELL_Izhi2007b_PT" weight="0.025" delay="2.52093599188 ms"/>
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        </projection>
        <projection id="NetConn_IT_L4_SOM_L23_AMPA" presynapticPopulation="IT_L4" postsynapticPopulation="SOM_L23" synapse="AMPA">
            <connectionWD id="0" preCellId="../IT_L4/25/CELL_Izhi2007b_IT" postCellId="../SOM_L23/0/CELL_Izhi2007b_SOM" weight="0.018125" delay="4.13463485481 ms"/>
            <connectionWD id="1" preCellId="../IT_L4/16/CELL_Izhi2007b_IT" postCellId="../SOM_L23/2/CELL_Izhi2007b_SOM" weight="0.018125" delay="3.17803241269 ms"/>
            <connectionWD id="2" preCellId="../IT_L4/22/CELL_Izhi2007b_IT" postCellId="../SOM_L23/4/CELL_Izhi2007b_SOM" weight="0.018125" delay="6.03622249858 ms"/>
        </projection>
        <projection id="NetConn_IT_L6_IT_L4_AMPA" presynapticPopulation="IT_L6" postsynapticPopulation="IT_L4" synapse="AMPA">
            <connectionWD id="0" preCellId="../IT_L6/15/CELL_Izhi2007b_IT" postCellId="../IT_L4/5/CELL_Izhi2007b_IT" weight="0.002" delay="9.20588961732 ms"/>
            <connectionWD id="1" preCellId="../IT_L6/12/CELL_Izhi2007b_IT" postCellId="../IT_L4/6/CELL_Izhi2007b_IT" weight="0.00425" delay="7.96688732186 ms"/>
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        </projection>
        <projection id="NetConn_IT_L4_CT_L6_AMPA" presynapticPopulation="IT_L4" postsynapticPopulation="CT_L6" synapse="AMPA">
            <connectionWD id="0" preCellId="../IT_L4/21/CELL_Izhi2007b_IT" postCellId="../CT_L6/14/CELL_Izhi2007b_CT" weight="0.014" delay="9.42473758032 ms"/>
            <connectionWD id="1" preCellId="../IT_L4/5/CELL_Izhi2007b_IT" postCellId="../CT_L6/18/CELL_Izhi2007b_CT" weight="0.1135" delay="8.15082238751 ms"/>
        </projection>
        <projection id="NetConn_PT_L5B_SOM_L23_AMPA" presynapticPopulation="PT_L5B" postsynapticPopulation="SOM_L23" synapse="AMPA">
            <connectionWD id="0" preCellId="../PT_L5B/12/CELL_Izhi2007b_PT" postCellId="../SOM_L23/2/CELL_Izhi2007b_SOM" weight="0.018125" delay="8.08388295083 ms"/>
        </projection>
        <projection id="NetConn_PT_L5B_IT_L4_AMPA" presynapticPopulation="PT_L5B" postsynapticPopulation="IT_L4" synapse="AMPA">
            <connectionWD id="0" preCellId="../PT_L5B/0/CELL_Izhi2007b_PT" postCellId="../IT_L4/0/CELL_Izhi2007b_IT" weight="0.0085" delay="5.24373645781 ms"/>
            <connectionWD id="1" preCellId="../PT_L5B/10/CELL_Izhi2007b_PT" postCellId="../IT_L4/0/CELL_Izhi2007b_IT" weight="0.0085" delay="4.80063200326 ms"/>
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        </projection>
        <projection id="NetConn_IT_L5A_IT_L6_AMPA" presynapticPopulation="IT_L5A" postsynapticPopulation="IT_L6" synapse="AMPA">
            <connectionWD id="0" preCellId="../IT_L5A/0/CELL_Izhi2007b_IT" postCellId="../IT_L6/1/CELL_Izhi2007b_IT" weight="0.014" delay="7.12729528025 ms"/>
            <connectionWD id="1" preCellId="../IT_L5A/4/CELL_Izhi2007b_IT" postCellId="../IT_L6/4/CELL_Izhi2007b_IT" weight="0.014" delay="7.31531562433 ms"/>
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        </projection>
        <projection id="NetConn_IT_L5A_PT_L5B_AMPA" presynapticPopulation="IT_L5A" postsynapticPopulation="PT_L5B" synapse="AMPA">
            <connectionWD id="0" preCellId="../IT_L5A/26/CELL_Izhi2007b_IT" postCellId="../PT_L5B/2/CELL_Izhi2007b_PT" weight="0.0355" delay="3.11540949756 ms"/>
            <connectionWD id="1" preCellId="../IT_L5A/23/CELL_Izhi2007b_IT" postCellId="../PT_L5B/4/CELL_Izhi2007b_PT" weight="0.044" delay="4.69256257702 ms"/>
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        </projection>
        <projection id="NetConn_SOM_L6_PV_L6_GABAB" presynapticPopulation="SOM_L6" postsynapticPopulation="PV_L6" synapse="GABAB">
            <connectionWD id="0" preCellId="../SOM_L6/4/CELL_Izhi2007b_SOM" postCellId="../PV_L6/0/CELL_Izhi2007b_PV" weight="0.025" delay="3.28277318576 ms"/>
            <connectionWD id="1" preCellId="../SOM_L6/1/CELL_Izhi2007b_SOM" postCellId="../PV_L6/0/CELL_Izhi2007b_PV" weight="0.025" delay="2.12666866787 ms"/>
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        </projection>
        <projection id="NetConn_PV_L6_IT_L6_GABAA" presynapticPopulation="PV_L6" postsynapticPopulation="IT_L6" synapse="GABAA">
            <connectionWD id="0" preCellId="../PV_L6/3/CELL_Izhi2007b_PV" postCellId="../IT_L6/1/CELL_Izhi2007b_IT" weight="0.025" delay="2.15091254763 ms"/>
            <connectionWD id="1" preCellId="../PV_L6/4/CELL_Izhi2007b_PV" postCellId="../IT_L6/1/CELL_Izhi2007b_IT" weight="0.025" delay="2.33051935002 ms"/>
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        </projection>
        <projection id="NetConn_PV_L6_SOM_L6_GABAA" presynapticPopulation="PV_L6" postsynapticPopulation="SOM_L6" synapse="GABAA">
            <connectionWD id="0" preCellId="../PV_L6/0/CELL_Izhi2007b_PV" postCellId="../SOM_L6/1/CELL_Izhi2007b_SOM" weight="0.025" delay="2.12666866787 ms"/>
            <connectionWD id="1" preCellId="../PV_L6/4/CELL_Izhi2007b_PV" postCellId="../SOM_L6/1/CELL_Izhi2007b_SOM" weight="0.025" delay="2.41454458772 ms"/>
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        </projection>
        <projection id="NetConn_CT_L6_IT_L5A_AMPA" presynapticPopulation="CT_L6" postsynapticPopulation="IT_L5A" synapse="AMPA">
            <connectionWD id="0" preCellId="../CT_L6/29/CELL_Izhi2007b_CT" postCellId="../IT_L5A/1/CELL_Izhi2007b_IT" weight="0.004" delay="7.67949721308 ms"/>
            <connectionWD id="1" preCellId="../CT_L6/15/CELL_Izhi2007b_CT" postCellId="../IT_L5A/1/CELL_Izhi2007b_IT" weight="0.004" delay="8.57188095338 ms"/>
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        </projection>
        <projection id="NetConn_PV_L6_PV_L6_GABAA" presynapticPopulation="PV_L6" postsynapticPopulation="PV_L6" synapse="GABAA">
            <connectionWD id="0" preCellId="../PV_L6/1/CELL_Izhi2007b_PV" postCellId="../PV_L6/0/CELL_Izhi2007b_PV" weight="0.025" delay="3.31966591663 ms"/>
            <connectionWD id="1" preCellId="../PV_L6/4/CELL_Izhi2007b_PV" postCellId="../PV_L6/0/CELL_Izhi2007b_PV" weight="0.025" delay="2.48852035651 ms"/>
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        </projection>
        <projection id="NetConn_CT_L6_IT_L23_AMPA" presynapticPopulation="CT_L6" postsynapticPopulation="IT_L23" synapse="AMPA">
            <connectionWD id="0" preCellId="../CT_L6/26/CELL_Izhi2007b_CT" postCellId="../IT_L23/43/CELL_Izhi2007b_IT" weight="0.013" delay="9.59674833631 ms"/>
        </projection>
        <projection id="NetConn_IT_L23_IT_L5B_AMPA" presynapticPopulation="IT_L23" postsynapticPopulation="IT_L5B" synapse="AMPA">
            <connectionWD id="0" preCellId="../IT_L23/5/CELL_Izhi2007b_IT" postCellId="../IT_L5B/2/CELL_Izhi2007b_IT" weight="0.011" delay="7.86003493872 ms"/>
            <connectionWD id="1" preCellId="../IT_L23/39/CELL_Izhi2007b_IT" postCellId="../IT_L5B/2/CELL_Izhi2007b_IT" weight="0.011" delay="7.60972142854 ms"/>
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        </projection>
        <projection id="NetConn_IT_L23_PV_L23_AMPA" presynapticPopulation="IT_L23" postsynapticPopulation="PV_L23" synapse="AMPA">
            <connectionWD id="0" preCellId="../IT_L23/3/CELL_Izhi2007b_IT" postCellId="../PV_L23/0/CELL_Izhi2007b_PV" weight="0.039" delay="2.70239459277 ms"/>
            <connectionWD id="1" preCellId="../IT_L23/6/CELL_Izhi2007b_IT" postCellId="../PV_L23/0/CELL_Izhi2007b_PV" weight="0.039" delay="2.89877936653 ms"/>
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        </projection>
        <projection id="NetConn_IT_L6_IT_L5B_AMPA" presynapticPopulation="IT_L6" postsynapticPopulation="IT_L5B" synapse="AMPA">
            <connectionWD id="0" preCellId="../IT_L6/24/CELL_Izhi2007b_IT" postCellId="../IT_L5B/0/CELL_Izhi2007b_IT" weight="0.015" delay="4.71955935792 ms"/>
            <connectionWD id="1" preCellId="../IT_L6/5/CELL_Izhi2007b_IT" postCellId="../IT_L5B/1/CELL_Izhi2007b_IT" weight="0.015" delay="5.45963051469 ms"/>
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        </projection>
        <projection id="NetConn_IT_L4_IT_L6_AMPA" presynapticPopulation="IT_L4" postsynapticPopulation="IT_L6" synapse="AMPA">
            <connectionWD id="0" preCellId="../IT_L4/22/CELL_Izhi2007b_IT" postCellId="../IT_L6/27/CELL_Izhi2007b_IT" weight="0.014" delay="7.78104332673 ms"/>
        </projection>
        <projection id="NetConn_SOM_L5_IT_L5B_GABAB" presynapticPopulation="SOM_L5" postsynapticPopulation="IT_L5B" synapse="GABAB">
            <connectionWD id="0" preCellId="../SOM_L5/0/CELL_Izhi2007b_SOM" postCellId="../IT_L5B/0/CELL_Izhi2007b_IT" weight="0.025" delay="3.80881850892 ms"/>
            <connectionWD id="1" preCellId="../SOM_L5/4/CELL_Izhi2007b_SOM" postCellId="../IT_L5B/0/CELL_Izhi2007b_IT" weight="0.025" delay="3.60856960694 ms"/>
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        </projection>
        <projection id="NetConn_IT_L4_IT_L4_AMPA" presynapticPopulation="IT_L4" postsynapticPopulation="IT_L4" synapse="AMPA">
            <connectionWD id="0" preCellId="../IT_L4/3/CELL_Izhi2007b_IT" postCellId="../IT_L4/0/CELL_Izhi2007b_IT" weight="0.0475" delay="2.43368387794 ms"/>
            <connectionWD id="1" preCellId="../IT_L4/4/CELL_Izhi2007b_IT" postCellId="../IT_L4/0/CELL_Izhi2007b_IT" weight="0.0475" delay="2.41554113388 ms"/>
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        </projection>
        <projection id="NetConn_IT_L5B_IT_L5B_AMPA" presynapticPopulation="IT_L5B" postsynapticPopulation="IT_L5B" synapse="AMPA">
            <connectionWD id="0" preCellId="../IT_L5B/18/CELL_Izhi2007b_IT" postCellId="../IT_L5B/0/CELL_Izhi2007b_IT" weight="0.0355" delay="2.78338184926 ms"/>
            <connectionWD id="1" preCellId="../IT_L5B/11/CELL_Izhi2007b_IT" postCellId="../IT_L5B/0/CELL_Izhi2007b_IT" weight="0.02525" delay="3.9677046765 ms"/>
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        </projection>
        <projection id="NetConn_IT_L5A_PV_L5_AMPA" presynapticPopulation="IT_L5A" postsynapticPopulation="PV_L5" synapse="AMPA">
            <connectionWD id="0" preCellId="../IT_L5A/27/CELL_Izhi2007b_IT" postCellId="../PV_L5/0/CELL_Izhi2007b_PV" weight="0.053875" delay="3.44353433605 ms"/>
            <connectionWD id="1" preCellId="../IT_L5A/1/CELL_Izhi2007b_IT" postCellId="../PV_L5/1/CELL_Izhi2007b_PV" weight="0.053875" delay="2.43040221528 ms"/>
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        </projection>
        <projection id="NetConn_PV_L5_IT_L5A_GABAA" presynapticPopulation="PV_L5" postsynapticPopulation="IT_L5A" synapse="GABAA">
            <connectionWD id="0" preCellId="../PV_L5/14/CELL_Izhi2007b_PV" postCellId="../IT_L5A/0/CELL_Izhi2007b_IT" weight="0.025" delay="2.87677621756 ms"/>
            <connectionWD id="1" preCellId="../PV_L5/5/CELL_Izhi2007b_PV" postCellId="../IT_L5A/0/CELL_Izhi2007b_IT" weight="0.025" delay="2.64620784495 ms"/>
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        </projection>
        <projection id="NetConn_PT_L5B_PV_L6_AMPA" presynapticPopulation="PT_L5B" postsynapticPopulation="PV_L6" synapse="AMPA">
            <connectionWD id="0" preCellId="../PT_L5B/3/CELL_Izhi2007b_PT" postCellId="../PV_L6/0/CELL_Izhi2007b_PV" weight="0.021875" delay="6.45190222978 ms"/>
            <connectionWD id="1" preCellId="../PT_L5B/4/CELL_Izhi2007b_PT" postCellId="../PV_L6/0/CELL_Izhi2007b_PV" weight="0.021875" delay="4.36457530415 ms"/>
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        </projection>
        <projection id="NetConn_SOM_L5_PT_L5B_GABAB" presynapticPopulation="SOM_L5" postsynapticPopulation="PT_L5B" synapse="GABAB">
            <connectionWD id="0" preCellId="../SOM_L5/5/CELL_Izhi2007b_SOM" postCellId="../PT_L5B/0/CELL_Izhi2007b_PT" weight="0.025" delay="3.24193186339 ms"/>
            <connectionWD id="1" preCellId="../SOM_L5/10/CELL_Izhi2007b_SOM" postCellId="../PT_L5B/0/CELL_Izhi2007b_PT" weight="0.025" delay="3.66080038056 ms"/>
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        </projection>
        <projection id="NetConn_SOM_L23_SOM_L23_GABAB" presynapticPopulation="SOM_L23" postsynapticPopulation="SOM_L23" synapse="GABAB">
            <connectionWD id="0" preCellId="../SOM_L23/1/CELL_Izhi2007b_SOM" postCellId="../SOM_L23/0/CELL_Izhi2007b_SOM" weight="0.025" delay="2.22920986462 ms"/>
            <connectionWD id="1" preCellId="../SOM_L23/3/CELL_Izhi2007b_SOM" postCellId="../SOM_L23/0/CELL_Izhi2007b_SOM" weight="0.025" delay="2.44984161686 ms"/>
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        </projection>
        <projection id="NetConn_IT_L4_IT_L23_AMPA" presynapticPopulation="IT_L4" postsynapticPopulation="IT_L23" synapse="AMPA">
            <connectionWD id="0" preCellId="../IT_L4/12/CELL_Izhi2007b_IT" postCellId="../IT_L23/0/CELL_Izhi2007b_IT" weight="0.029" delay="3.34788876192 ms"/>
            <connectionWD id="1" preCellId="../IT_L4/13/CELL_Izhi2007b_IT" postCellId="../IT_L23/1/CELL_Izhi2007b_IT" weight="0.029" delay="3.75119249662 ms"/>
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        </projection>
        <projection id="NetConn_IT_L6_SOM_L6_AMPA" presynapticPopulation="IT_L6" postsynapticPopulation="SOM_L6" synapse="AMPA">
            <connectionWD id="0" preCellId="../IT_L6/27/CELL_Izhi2007b_IT" postCellId="../SOM_L6/0/CELL_Izhi2007b_SOM" weight="0.0265" delay="2.83449797223 ms"/>
            <connectionWD id="1" preCellId="../IT_L6/20/CELL_Izhi2007b_IT" postCellId="../SOM_L6/1/CELL_Izhi2007b_SOM" weight="0.0265" delay="3.87306707617 ms"/>
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        </projection>
        <projection id="NetConn_IT_L5A_PV_L6_AMPA" presynapticPopulation="IT_L5A" postsynapticPopulation="PV_L6" synapse="AMPA">
            <connectionWD id="0" preCellId="../IT_L5A/1/CELL_Izhi2007b_IT" postCellId="../PV_L6/1/CELL_Izhi2007b_PV" weight="0.021875" delay="8.11523107468 ms"/>
            <connectionWD id="1" preCellId="../IT_L5A/22/CELL_Izhi2007b_IT" postCellId="../PV_L6/6/CELL_Izhi2007b_PV" weight="0.021875" delay="7.58048197897 ms"/>
        </projection>
        <projection id="NetConn_IT_L23_IT_L4_AMPA" presynapticPopulation="IT_L23" postsynapticPopulation="IT_L4" synapse="AMPA">
            <connectionWD id="0" preCellId="../IT_L23/22/CELL_Izhi2007b_IT" postCellId="../IT_L4/0/CELL_Izhi2007b_IT" weight="0.0155" delay="4.83723536491 ms"/>
            <connectionWD id="1" preCellId="../IT_L23/29/CELL_Izhi2007b_IT" postCellId="../IT_L4/0/CELL_Izhi2007b_IT" weight="0.0155" delay="4.97891289402 ms"/>
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        </projection>
        <projection id="NetConn_IT_L5A_IT_L5A_AMPA" presynapticPopulation="IT_L5A" postsynapticPopulation="IT_L5A" synapse="AMPA">
            <connectionWD id="0" preCellId="../IT_L5A/19/CELL_Izhi2007b_IT" postCellId="../IT_L5A/0/CELL_Izhi2007b_IT" weight="0.033" delay="2.73181194749 ms"/>
            <connectionWD id="1" preCellId="../IT_L5A/25/CELL_Izhi2007b_IT" postCellId="../IT_L5A/0/CELL_Izhi2007b_IT" weight="0.033" delay="2.17376186623 ms"/>
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        </projection>
        <projection id="NetConn_CT_L6_SOM_L6_AMPA" presynapticPopulation="CT_L6" postsynapticPopulation="SOM_L6" synapse="AMPA">
            <connectionWD id="0" preCellId="../CT_L6/17/CELL_Izhi2007b_CT" postCellId="../SOM_L6/0/CELL_Izhi2007b_SOM" weight="0.0265" delay="4.89781143037 ms"/>
            <connectionWD id="1" preCellId="../CT_L6/1/CELL_Izhi2007b_CT" postCellId="../SOM_L6/6/CELL_Izhi2007b_SOM" weight="0.0265" delay="2.75391456108 ms"/>
        </projection>
        <projection id="NetConn_IT_L5B_IT_L23_AMPA" presynapticPopulation="IT_L5B" postsynapticPopulation="IT_L23" synapse="AMPA">
            <connectionWD id="0" preCellId="../IT_L5B/17/CELL_Izhi2007b_IT" postCellId="../IT_L23/0/CELL_Izhi2007b_IT" weight="0.013" delay="5.98563625816 ms"/>
            <connectionWD id="1" preCellId="../IT_L5B/20/CELL_Izhi2007b_IT" postCellId="../IT_L23/0/CELL_Izhi2007b_IT" weight="0.013" delay="7.43995616384 ms"/>
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        </projection>
        <projection id="NetConn_IT_L5B_IT_L4_AMPA" presynapticPopulation="IT_L5B" postsynapticPopulation="IT_L4" synapse="AMPA">
            <connectionWD id="0" preCellId="../IT_L5B/7/CELL_Izhi2007b_IT" postCellId="../IT_L4/0/CELL_Izhi2007b_IT" weight="0.0085" delay="4.30232067738 ms"/>
            <connectionWD id="1" preCellId="../IT_L5B/10/CELL_Izhi2007b_IT" postCellId="../IT_L4/0/CELL_Izhi2007b_IT" weight="0.0085" delay="5.26352884734 ms"/>
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        </projection>
        <projection id="NetConn_CT_L6_PV_L5_AMPA" presynapticPopulation="CT_L6" postsynapticPopulation="PV_L5" synapse="AMPA">
            <connectionWD id="0" preCellId="../CT_L6/29/CELL_Izhi2007b_CT" postCellId="../PV_L5/1/CELL_Izhi2007b_PV" weight="0.012393" delay="8.02641972733 ms"/>
            <connectionWD id="1" preCellId="../CT_L6/21/CELL_Izhi2007b_CT" postCellId="../PV_L5/3/CELL_Izhi2007b_PV" weight="0.012393" delay="4.25170780508 ms"/>
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        </projection>
        <projection id="NetConn_PT_L5B_PV_L5_AMPA" presynapticPopulation="PT_L5B" postsynapticPopulation="PV_L5" synapse="AMPA">
            <connectionWD id="0" preCellId="../PT_L5B/3/CELL_Izhi2007b_PT" postCellId="../PV_L5/0/CELL_Izhi2007b_PV" weight="0.053875" delay="3.08458901694 ms"/>
            <connectionWD id="1" preCellId="../PT_L5B/4/CELL_Izhi2007b_PT" postCellId="../PV_L5/0/CELL_Izhi2007b_PV" weight="0.053875" delay="3.0763983164 ms"/>
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        </projection>
        <projection id="NetConn_IT_L5A_SOM_L23_AMPA" presynapticPopulation="IT_L5A" postsynapticPopulation="SOM_L23" synapse="AMPA">
            <connectionWD id="0" preCellId="../IT_L5A/22/CELL_Izhi2007b_IT" postCellId="../SOM_L23/2/CELL_Izhi2007b_SOM" weight="0.018125" delay="4.77957723318 ms"/>
        </projection>
        <projection id="NetConn_IT_L6_PV_L5_AMPA" presynapticPopulation="IT_L6" postsynapticPopulation="PV_L5" synapse="AMPA">
            <connectionWD id="0" preCellId="../IT_L6/18/CELL_Izhi2007b_IT" postCellId="../PV_L5/0/CELL_Izhi2007b_PV" weight="0.012393" delay="7.03682606622 ms"/>
            <connectionWD id="1" preCellId="../IT_L6/28/CELL_Izhi2007b_IT" postCellId="../PV_L5/0/CELL_Izhi2007b_PV" weight="0.012393" delay="5.00100373664 ms"/>
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        </projection>
        <projection id="NetConn_CT_L6_SOM_L5_AMPA" presynapticPopulation="CT_L6" postsynapticPopulation="SOM_L5" synapse="AMPA">
            <connectionWD id="0" preCellId="../CT_L6/0/CELL_Izhi2007b_CT" postCellId="../SOM_L5/0/CELL_Izhi2007b_SOM" weight="0.012393" delay="3.44576478825 ms"/>
            <connectionWD id="1" preCellId="../CT_L6/12/CELL_Izhi2007b_CT" postCellId="../SOM_L5/2/CELL_Izhi2007b_SOM" weight="0.012393" delay="9.55439765115 ms"/>
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        </projection>
        <projection id="NetConn_IT_L6_CT_L6_AMPA" presynapticPopulation="IT_L6" postsynapticPopulation="CT_L6" synapse="AMPA">
            <connectionWD id="0" preCellId="../IT_L6/25/CELL_Izhi2007b_IT" postCellId="../CT_L6/0/CELL_Izhi2007b_CT" weight="0.0265" delay="3.51564844872 ms"/>
            <connectionWD id="1" preCellId="../IT_L6/1/CELL_Izhi2007b_IT" postCellId="../CT_L6/5/CELL_Izhi2007b_CT" weight="0.0265" delay="4.16621584199 ms"/>
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        </projection>
        <projection id="NetConn_SOM_L5_PV_L5_GABAB" presynapticPopulation="SOM_L5" postsynapticPopulation="PV_L5" synapse="GABAB">
            <connectionWD id="0" preCellId="../SOM_L5/1/CELL_Izhi2007b_SOM" postCellId="../PV_L5/0/CELL_Izhi2007b_PV" weight="0.025" delay="3.12984720834 ms"/>
            <connectionWD id="1" preCellId="../SOM_L5/6/CELL_Izhi2007b_SOM" postCellId="../PV_L5/0/CELL_Izhi2007b_PV" weight="0.025" delay="2.5253317787 ms"/>
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        </projection>
        <projection id="NetConn_SOM_L5_IT_L4_GABAB" presynapticPopulation="SOM_L5" postsynapticPopulation="IT_L4" synapse="GABAB">
            <connectionWD id="0" preCellId="../SOM_L5/2/CELL_Izhi2007b_SOM" postCellId="../IT_L4/0/CELL_Izhi2007b_IT" weight="0.025" delay="2.49721862637 ms"/>
            <connectionWD id="1" preCellId="../SOM_L5/10/CELL_Izhi2007b_SOM" postCellId="../IT_L4/0/CELL_Izhi2007b_IT" weight="0.025" delay="3.65853258862 ms"/>
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        </projection>
        <projection id="NetConn_IT_L5A_IT_L5B_AMPA" presynapticPopulation="IT_L5A" postsynapticPopulation="IT_L5B" synapse="AMPA">
            <connectionWD id="0" preCellId="../IT_L5A/11/CELL_Izhi2007b_IT" postCellId="../IT_L5B/2/CELL_Izhi2007b_IT" weight="0.044" delay="3.66497000599 ms"/>
            <connectionWD id="1" preCellId="../IT_L5A/2/CELL_Izhi2007b_IT" postCellId="../IT_L5B/2/CELL_Izhi2007b_IT" weight="0.0355" delay="3.142158429 ms"/>
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        </projection>
        <projection id="NetConn_PV_L23_PV_L23_GABAA" presynapticPopulation="PV_L23" postsynapticPopulation="PV_L23" synapse="GABAA">
            <connectionWD id="0" preCellId="../PV_L23/1/CELL_Izhi2007b_PV" postCellId="../PV_L23/0/CELL_Izhi2007b_PV" weight="0.025" delay="2.62653956506 ms"/>
            <connectionWD id="1" preCellId="../PV_L23/2/CELL_Izhi2007b_PV" postCellId="../PV_L23/0/CELL_Izhi2007b_PV" weight="0.025" delay="3.16707372745 ms"/>
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        </projection>
        <projection id="NetConn_IT_L4_IT_L5A_AMPA" presynapticPopulation="IT_L4" postsynapticPopulation="IT_L5A" synapse="AMPA">
            <connectionWD id="0" preCellId="../IT_L4/19/CELL_Izhi2007b_IT" postCellId="../IT_L5A/0/CELL_Izhi2007b_IT" weight="0.03" delay="2.84438841047 ms"/>
            <connectionWD id="1" preCellId="../IT_L4/3/CELL_Izhi2007b_IT" postCellId="../IT_L5A/2/CELL_Izhi2007b_IT" weight="0.044" delay="4.15375544619 ms"/>
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        </projection>
        <projection id="NetConn_IT_L23_IT_L5A_AMPA" presynapticPopulation="IT_L23" postsynapticPopulation="IT_L5A" synapse="AMPA">
            <connectionWD id="0" preCellId="../IT_L23/33/CELL_Izhi2007b_IT" postCellId="../IT_L5A/0/CELL_Izhi2007b_IT" weight="0.0275" delay="6.12190078485 ms"/>
            <connectionWD id="1" preCellId="../IT_L23/5/CELL_Izhi2007b_IT" postCellId="../IT_L5A/0/CELL_Izhi2007b_IT" weight="0.0275" delay="5.87314212403 ms"/>
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        </projection>
        <projection id="NetConn_SOM_L5_IT_L5A_GABAB" presynapticPopulation="SOM_L5" postsynapticPopulation="IT_L5A" synapse="GABAB">
            <connectionWD id="0" preCellId="../SOM_L5/7/CELL_Izhi2007b_SOM" postCellId="../IT_L5A/0/CELL_Izhi2007b_IT" weight="0.025" delay="3.84869394853 ms"/>
            <connectionWD id="1" preCellId="../SOM_L5/12/CELL_Izhi2007b_SOM" postCellId="../IT_L5A/0/CELL_Izhi2007b_IT" weight="0.025" delay="3.58850203291 ms"/>
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        </projection>
        <projection id="NetConn_IT_L6_IT_L5A_AMPA" presynapticPopulation="IT_L6" postsynapticPopulation="IT_L5A" synapse="AMPA">
            <connectionWD id="0" preCellId="../IT_L6/5/CELL_Izhi2007b_IT" postCellId="../IT_L5A/0/CELL_Izhi2007b_IT" weight="0.004" delay="7.28252803586 ms"/>
            <connectionWD id="1" preCellId="../IT_L6/14/CELL_Izhi2007b_IT" postCellId="../IT_L5A/1/CELL_Izhi2007b_IT" weight="0.004" delay="7.921417439 ms"/>
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        </projection>
        <projection id="NetConn_IT_L5B_PV_L23_AMPA" presynapticPopulation="IT_L5B" postsynapticPopulation="PV_L23" synapse="AMPA">
            <connectionWD id="0" preCellId="../IT_L5B/11/CELL_Izhi2007b_IT" postCellId="../PV_L23/4/CELL_Izhi2007b_PV" weight="0.018125" delay="9.41187009664 ms"/>
        </projection>
        <projection id="NetConn_CT_L6_PV_L6_AMPA" presynapticPopulation="CT_L6" postsynapticPopulation="PV_L6" synapse="AMPA">
            <connectionWD id="0" preCellId="../CT_L6/30/CELL_Izhi2007b_CT" postCellId="../PV_L6/1/CELL_Izhi2007b_PV" weight="0.0265" delay="4.22962223443 ms"/>
            <connectionWD id="1" preCellId="../CT_L6/14/CELL_Izhi2007b_CT" postCellId="../PV_L6/2/CELL_Izhi2007b_PV" weight="0.0265" delay="2.46851397918 ms"/>
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        </projection>
        <projection id="NetConn_SOM_L23_PV_L23_GABAB" presynapticPopulation="SOM_L23" postsynapticPopulation="PV_L23" synapse="GABAB">
            <connectionWD id="0" preCellId="../SOM_L23/1/CELL_Izhi2007b_SOM" postCellId="../PV_L23/0/CELL_Izhi2007b_PV" weight="0.025" delay="3.92039726063 ms"/>
            <connectionWD id="1" preCellId="../SOM_L23/3/CELL_Izhi2007b_SOM" postCellId="../PV_L23/0/CELL_Izhi2007b_PV" weight="0.025" delay="3.30833311023 ms"/>
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        </projection>
        <projection id="NetConn_IT_L5B_IT_L5A_AMPA" presynapticPopulation="IT_L5B" postsynapticPopulation="IT_L5A" synapse="AMPA">
            <connectionWD id="0" preCellId="../IT_L5B/3/CELL_Izhi2007b_IT" postCellId="../IT_L5A/1/CELL_Izhi2007b_IT" weight="0.012" delay="4.4838799279 ms"/>
            <connectionWD id="1" preCellId="../IT_L5B/18/CELL_Izhi2007b_IT" postCellId="../IT_L5A/1/CELL_Izhi2007b_IT" weight="0.012" delay="4.45860536029 ms"/>
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        </projection>
        <projection id="NetConn_IT_L4_PV_L23_AMPA" presynapticPopulation="IT_L4" postsynapticPopulation="PV_L23" synapse="AMPA">
            <connectionWD id="0" preCellId="../IT_L4/6/CELL_Izhi2007b_IT" postCellId="../PV_L23/4/CELL_Izhi2007b_PV" weight="0.018125" delay="3.8652274173 ms"/>
            <connectionWD id="1" preCellId="../IT_L4/3/CELL_Izhi2007b_IT" postCellId="../PV_L23/5/CELL_Izhi2007b_PV" weight="0.018125" delay="2.57031611529 ms"/>
        </projection>
        <projection id="NetConn_IT_L4_SOM_L6_AMPA" presynapticPopulation="IT_L4" postsynapticPopulation="SOM_L6" synapse="AMPA">
            <connectionWD id="0" preCellId="../IT_L4/17/CELL_Izhi2007b_IT" postCellId="../SOM_L6/1/CELL_Izhi2007b_SOM" weight="0.021875" delay="8.47775471024 ms"/>
            <connectionWD id="1" preCellId="../IT_L4/20/CELL_Izhi2007b_IT" postCellId="../SOM_L6/2/CELL_Izhi2007b_SOM" weight="0.021875" delay="10.8922127524 ms"/>
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        </projection>
        <projection id="NetConn_IT_L5B_PV_L5_AMPA" presynapticPopulation="IT_L5B" postsynapticPopulation="PV_L5" synapse="AMPA">
            <connectionWD id="0" preCellId="../IT_L5B/4/CELL_Izhi2007b_IT" postCellId="../PV_L5/0/CELL_Izhi2007b_PV" weight="0.053875" delay="3.01542109092 ms"/>
            <connectionWD id="1" preCellId="../IT_L5B/22/CELL_Izhi2007b_IT" postCellId="../PV_L5/0/CELL_Izhi2007b_PV" weight="0.053875" delay="2.19811174949 ms"/>
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        </projection>
        <projection id="NetConn_IT_L4_PV_L5_AMPA" presynapticPopulation="IT_L4" postsynapticPopulation="PV_L5" synapse="AMPA">
            <connectionWD id="0" preCellId="../IT_L4/0/CELL_Izhi2007b_IT" postCellId="../PV_L5/0/CELL_Izhi2007b_PV" weight="0.053875" delay="5.33137011096 ms"/>
            <connectionWD id="1" preCellId="../IT_L4/7/CELL_Izhi2007b_IT" postCellId="../PV_L5/0/CELL_Izhi2007b_PV" weight="0.053875" delay="4.87666034969 ms"/>
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        </projection>
        <projection id="NetConn_IT_L5B_IT_L6_AMPA" presynapticPopulation="IT_L5B" postsynapticPopulation="IT_L6" synapse="AMPA">
            <connectionWD id="0" preCellId="../IT_L5B/22/CELL_Izhi2007b_IT" postCellId="../IT_L6/1/CELL_Izhi2007b_IT" weight="0.0245" delay="4.91911911172 ms"/>
            <connectionWD id="1" preCellId="../IT_L5B/15/CELL_Izhi2007b_IT" postCellId="../IT_L6/10/CELL_Izhi2007b_IT" weight="0.0245" delay="3.68348186754 ms"/>
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        </projection>
        <projection id="NetConn_IT_L23_IT_L23_AMPA" presynapticPopulation="IT_L23" postsynapticPopulation="IT_L23" synapse="AMPA">
            <connectionWD id="0" preCellId="../IT_L23/2/CELL_Izhi2007b_IT" postCellId="../IT_L23/0/CELL_Izhi2007b_IT" weight="0.022" delay="3.61652710099 ms"/>
            <connectionWD id="1" preCellId="../IT_L23/6/CELL_Izhi2007b_IT" postCellId="../IT_L23/0/CELL_Izhi2007b_IT" weight="0.022" delay="2.94207097771 ms"/>
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        </projection>
        <projection id="NetConn_PV_L23_SOM_L23_GABAA" presynapticPopulation="PV_L23" postsynapticPopulation="SOM_L23" synapse="GABAA">
            <connectionWD id="0" preCellId="../PV_L23/1/CELL_Izhi2007b_PV" postCellId="../SOM_L23/0/CELL_Izhi2007b_SOM" weight="0.025" delay="3.23197410476 ms"/>
            <connectionWD id="1" preCellId="../PV_L23/2/CELL_Izhi2007b_PV" postCellId="../SOM_L23/0/CELL_Izhi2007b_SOM" weight="0.025" delay="2.61038830487 ms"/>
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        </projection>
        <projection id="NetConn_CT_L6_IT_L6_AMPA" presynapticPopulation="CT_L6" postsynapticPopulation="IT_L6" synapse="AMPA">
            <connectionWD id="0" preCellId="../CT_L6/2/CELL_Izhi2007b_CT" postCellId="../IT_L6/0/CELL_Izhi2007b_IT" weight="0.0265" delay="4.00803543612 ms"/>
            <connectionWD id="1" preCellId="../CT_L6/2/CELL_Izhi2007b_CT" postCellId="../IT_L6/4/CELL_Izhi2007b_IT" weight="0.0265" delay="2.39764692938 ms"/>
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        </projection>
        <projection id="NetConn_SOM_L6_IT_L6_GABAB" presynapticPopulation="SOM_L6" postsynapticPopulation="IT_L6" synapse="GABAB">
            <connectionWD id="0" preCellId="../SOM_L6/3/CELL_Izhi2007b_SOM" postCellId="../IT_L6/0/CELL_Izhi2007b_IT" weight="0.025" delay="4.71531518408 ms"/>
            <connectionWD id="1" preCellId="../SOM_L6/2/CELL_Izhi2007b_SOM" postCellId="../IT_L6/0/CELL_Izhi2007b_IT" weight="0.025" delay="2.15875807021 ms"/>
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        </projection>
        <projection id="NetConn_IT_L4_SOM_L5_AMPA" presynapticPopulation="IT_L4" postsynapticPopulation="SOM_L5" synapse="AMPA">
            <connectionWD id="0" preCellId="../IT_L4/12/CELL_Izhi2007b_IT" postCellId="../SOM_L5/0/CELL_Izhi2007b_SOM" weight="0.006125" delay="7.4638721394 ms"/>
            <connectionWD id="1" preCellId="../IT_L4/22/CELL_Izhi2007b_IT" postCellId="../SOM_L5/0/CELL_Izhi2007b_SOM" weight="0.006125" delay="6.6553594886 ms"/>
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        </projection>
        <projection id="NetConn_PT_L5B_IT_L5A_AMPA" presynapticPopulation="PT_L5B" postsynapticPopulation="IT_L5A" synapse="AMPA">
            <connectionWD id="0" preCellId="../PT_L5B/3/CELL_Izhi2007b_PT" postCellId="../IT_L5A/0/CELL_Izhi2007b_IT" weight="0.012" delay="3.07950566881 ms"/>
            <connectionWD id="1" preCellId="../PT_L5B/17/CELL_Izhi2007b_PT" postCellId="../IT_L5A/0/CELL_Izhi2007b_IT" weight="0.012" delay="5.65516653497 ms"/>
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        </projection>
        <projection id="NetConn_IT_L5B_PT_L5B_AMPA" presynapticPopulation="IT_L5B" postsynapticPopulation="PT_L5B" synapse="AMPA">
            <connectionWD id="0" preCellId="../IT_L5B/6/CELL_Izhi2007b_IT" postCellId="../PT_L5B/0/CELL_Izhi2007b_PT" weight="0.0355" delay="3.02139796516 ms"/>
            <connectionWD id="1" preCellId="../IT_L5B/15/CELL_Izhi2007b_IT" postCellId="../PT_L5B/0/CELL_Izhi2007b_PT" weight="0.0355" delay="3.82708963751 ms"/>
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        </projection>
        <projection id="NetConn_PV_L5_PV_L5_GABAA" presynapticPopulation="PV_L5" postsynapticPopulation="PV_L5" synapse="GABAA">
            <connectionWD id="0" preCellId="../PV_L5/13/CELL_Izhi2007b_PV" postCellId="../PV_L5/0/CELL_Izhi2007b_PV" weight="0.025" delay="4.69083897771 ms"/>
            <connectionWD id="1" preCellId="../PV_L5/1/CELL_Izhi2007b_PV" postCellId="../PV_L5/0/CELL_Izhi2007b_PV" weight="0.025" delay="3.88118544856 ms"/>
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        </projection>
        <projection id="NetConn_IT_L23_SOM_L23_AMPA" presynapticPopulation="IT_L23" postsynapticPopulation="SOM_L23" synapse="AMPA">
            <connectionWD id="0" preCellId="../IT_L23/0/CELL_Izhi2007b_IT" postCellId="../SOM_L23/0/CELL_Izhi2007b_SOM" weight="0.039" delay="2.12809521424 ms"/>
            <connectionWD id="1" preCellId="../IT_L23/1/CELL_Izhi2007b_IT" postCellId="../SOM_L23/0/CELL_Izhi2007b_SOM" weight="0.039" delay="2.50954638656 ms"/>
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        </projection>
        <projection id="NetConn_PT_L5B_PV_L23_AMPA" presynapticPopulation="PT_L5B" postsynapticPopulation="PV_L23" synapse="AMPA">
            <connectionWD id="0" preCellId="../PT_L5B/2/CELL_Izhi2007b_PT" postCellId="../PV_L23/2/CELL_Izhi2007b_PV" weight="0.018125" delay="7.11107157177 ms"/>
            <connectionWD id="1" preCellId="../PT_L5B/17/CELL_Izhi2007b_PT" postCellId="../PV_L23/2/CELL_Izhi2007b_PV" weight="0.018125" delay="8.84991232504 ms"/>
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        </projection>
        <projection id="NetConn_PT_L5B_SOM_L5_AMPA" presynapticPopulation="PT_L5B" postsynapticPopulation="SOM_L5" synapse="AMPA">
            <connectionWD id="0" preCellId="../PT_L5B/17/CELL_Izhi2007b_PT" postCellId="../SOM_L5/1/CELL_Izhi2007b_SOM" weight="0.006125" delay="2.46237264447 ms"/>
            <connectionWD id="1" preCellId="../PT_L5B/21/CELL_Izhi2007b_PT" postCellId="../SOM_L5/1/CELL_Izhi2007b_SOM" weight="0.006125" delay="2.78347362085 ms"/>
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        </projection>
        <projection id="NetConn_IT_L5A_IT_L4_AMPA" presynapticPopulation="IT_L5A" postsynapticPopulation="IT_L4" synapse="AMPA">
            <connectionWD id="0" preCellId="../IT_L5A/20/CELL_Izhi2007b_IT" postCellId="../IT_L4/0/CELL_Izhi2007b_IT" weight="0.024" delay="3.42562187953 ms"/>
            <connectionWD id="1" preCellId="../IT_L5A/19/CELL_Izhi2007b_IT" postCellId="../IT_L4/1/CELL_Izhi2007b_IT" weight="0.024" delay="3.79584975333 ms"/>
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        </projection>
        <projection id="NetConn_IT_L4_PV_L6_AMPA" presynapticPopulation="IT_L4" postsynapticPopulation="PV_L6" synapse="AMPA">
            <connectionWD id="0" preCellId="../IT_L4/20/CELL_Izhi2007b_IT" postCellId="../PV_L6/1/CELL_Izhi2007b_PV" weight="0.021875" delay="10.2260089539 ms"/>
            <connectionWD id="1" preCellId="../IT_L4/24/CELL_Izhi2007b_IT" postCellId="../PV_L6/2/CELL_Izhi2007b_PV" weight="0.021875" delay="10.137191895 ms"/>
            <connectionWD id="2" preCellId="../IT_L4/5/CELL_Izhi2007b_IT" postCellId="../PV_L6/3/CELL_Izhi2007b_PV" weight="0.021875" delay="7.79918937368 ms"/>
            <connectionWD id="3" preCellId="../IT_L4/15/CELL_Izhi2007b_IT" postCellId="../PV_L6/4/CELL_Izhi2007b_PV" weight="0.021875" delay="8.20288655364 ms"/>
        </projection>
        <projection id="NetConn_IT_L23_PT_L5B_AMPA" presynapticPopulation="IT_L23" postsynapticPopulation="PT_L5B" synapse="AMPA">
            <connectionWD id="0" preCellId="../IT_L23/16/CELL_Izhi2007b_IT" postCellId="../PT_L5B/0/CELL_Izhi2007b_PT" weight="0.011" delay="7.94646090059 ms"/>
            <connectionWD id="1" preCellId="../IT_L23/42/CELL_Izhi2007b_IT" postCellId="../PT_L5B/0/CELL_Izhi2007b_PT" weight="0.011" delay="7.55853348663 ms"/>
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        </projection>
        <projection id="NetConn_IT_L6_PT_L5B_AMPA" presynapticPopulation="IT_L6" postsynapticPopulation="PT_L5B" synapse="AMPA">
            <connectionWD id="0" preCellId="../IT_L6/24/CELL_Izhi2007b_IT" postCellId="../PT_L5B/4/CELL_Izhi2007b_PT" weight="0.015" delay="3.84802481073 ms"/>
            <connectionWD id="1" preCellId="../IT_L6/29/CELL_Izhi2007b_IT" postCellId="../PT_L5B/6/CELL_Izhi2007b_PT" weight="0.015" delay="5.11391221076 ms"/>
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        </projection>
        <projection id="NetConn_IT_L5A_SOM_L6_AMPA" presynapticPopulation="IT_L5A" postsynapticPopulation="SOM_L6" synapse="AMPA">
            <connectionWD id="0" preCellId="../IT_L5A/19/CELL_Izhi2007b_IT" postCellId="../SOM_L6/0/CELL_Izhi2007b_SOM" weight="0.021875" delay="5.76196520411 ms"/>
            <connectionWD id="1" preCellId="../IT_L5A/10/CELL_Izhi2007b_IT" postCellId="../SOM_L6/1/CELL_Izhi2007b_SOM" weight="0.021875" delay="7.97408367748 ms"/>
            <connectionWD id="2" preCellId="../IT_L5A/16/CELL_Izhi2007b_IT" postCellId="../SOM_L6/1/CELL_Izhi2007b_SOM" weight="0.021875" delay="7.24673997728 ms"/>
            <connectionWD id="3" preCellId="../IT_L5A/12/CELL_Izhi2007b_IT" postCellId="../SOM_L6/5/CELL_Izhi2007b_SOM" weight="0.021875" delay="6.00913462326 ms"/>
        </projection>
        <projection id="NetConn_PT_L5B_PT_L5B_AMPA" presynapticPopulation="PT_L5B" postsynapticPopulation="PT_L5B" synapse="AMPA">
            <connectionWD id="0" preCellId="../PT_L5B/2/CELL_Izhi2007b_PT" postCellId="../PT_L5B/0/CELL_Izhi2007b_PT" weight="0.0355" delay="2.13713917442 ms"/>
            <connectionWD id="1" preCellId="../PT_L5B/9/CELL_Izhi2007b_PT" postCellId="../PT_L5B/1/CELL_Izhi2007b_PT" weight="0.0355" delay="4.09654395117 ms"/>
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        </projection>
        <projection id="NetConn_CT_L6_PT_L5B_AMPA" presynapticPopulation="CT_L6" postsynapticPopulation="PT_L5B" synapse="AMPA">
            <connectionWD id="0" preCellId="../CT_L6/21/CELL_Izhi2007b_CT" postCellId="../PT_L5B/0/CELL_Izhi2007b_PT" weight="0.015" delay="5.77392915183 ms"/>
            <connectionWD id="1" preCellId="../CT_L6/12/CELL_Izhi2007b_CT" postCellId="../PT_L5B/1/CELL_Izhi2007b_PT" weight="0.015" delay="5.34324548531 ms"/>
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        </projection>
        <projection id="NetConn_IT_L6_IT_L6_AMPA" presynapticPopulation="IT_L6" postsynapticPopulation="IT_L6" synapse="AMPA">
            <connectionWD id="0" preCellId="../IT_L6/6/CELL_Izhi2007b_IT" postCellId="../IT_L6/0/CELL_Izhi2007b_IT" weight="0.0245" delay="4.69921625591 ms"/>
            <connectionWD id="1" preCellId="../IT_L6/27/CELL_Izhi2007b_IT" postCellId="../IT_L6/0/CELL_Izhi2007b_IT" weight="0.0265" delay="4.28521467982 ms"/>
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        </projection>
        <projection id="NetConn_CT_L6_IT_L5B_AMPA" presynapticPopulation="CT_L6" postsynapticPopulation="IT_L5B" synapse="AMPA">
            <connectionWD id="0" preCellId="../CT_L6/0/CELL_Izhi2007b_CT" postCellId="../IT_L5B/1/CELL_Izhi2007b_IT" weight="0.015" delay="5.67924911303 ms"/>
            <connectionWD id="1" preCellId="../CT_L6/25/CELL_Izhi2007b_CT" postCellId="../IT_L5B/3/CELL_Izhi2007b_IT" weight="0.02525" delay="3.88657527155 ms"/>
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        </projection>
        <projection id="NetConn_PV_L23_IT_L23_GABAA" presynapticPopulation="PV_L23" postsynapticPopulation="IT_L23" synapse="GABAA">
            <connectionWD id="0" preCellId="../PV_L23/4/CELL_Izhi2007b_PV" postCellId="../IT_L23/0/CELL_Izhi2007b_IT" weight="0.025" delay="2.59309674171 ms"/>
            <connectionWD id="1" preCellId="../PV_L23/4/CELL_Izhi2007b_PV" postCellId="../IT_L23/1/CELL_Izhi2007b_IT" weight="0.025" delay="2.12520072207 ms"/>
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        </projection>
        <projection id="NetConn_PV_L6_CT_L6_GABAA" presynapticPopulation="PV_L6" postsynapticPopulation="CT_L6" synapse="GABAA">
            <connectionWD id="0" preCellId="../PV_L6/0/CELL_Izhi2007b_PV" postCellId="../CT_L6/0/CELL_Izhi2007b_CT" weight="0.025" delay="2.36549213343 ms"/>
            <connectionWD id="1" preCellId="../PV_L6/3/CELL_Izhi2007b_PV" postCellId="../CT_L6/0/CELL_Izhi2007b_CT" weight="0.025" delay="2.42888557482 ms"/>
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        </projection>
        <projection id="NetConn_PT_L5B_SOM_L6_AMPA" presynapticPopulation="PT_L5B" postsynapticPopulation="SOM_L6" synapse="AMPA">
            <connectionWD id="0" preCellId="../PT_L5B/9/CELL_Izhi2007b_PT" postCellId="../SOM_L6/1/CELL_Izhi2007b_SOM" weight="0.021875" delay="6.15667232196 ms"/>
            <connectionWD id="1" preCellId="../PT_L5B/25/CELL_Izhi2007b_PT" postCellId="../SOM_L6/1/CELL_Izhi2007b_SOM" weight="0.021875" delay="4.47228724331 ms"/>
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        </projection>
        <projection id="NetConn_PV_L5_IT_L5B_GABAA" presynapticPopulation="PV_L5" postsynapticPopulation="IT_L5B" synapse="GABAA">
            <connectionWD id="0" preCellId="../PV_L5/0/CELL_Izhi2007b_PV" postCellId="../IT_L5B/0/CELL_Izhi2007b_IT" weight="0.025" delay="2.40551799563 ms"/>
            <connectionWD id="1" preCellId="../PV_L5/0/CELL_Izhi2007b_PV" postCellId="../IT_L5B/1/CELL_Izhi2007b_IT" weight="0.025" delay="2.38299191449 ms"/>
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        </projection>
        <projection id="NetConn_IT_L5A_CT_L6_AMPA" presynapticPopulation="IT_L5A" postsynapticPopulation="CT_L6" synapse="AMPA">
            <connectionWD id="0" preCellId="../IT_L5A/17/CELL_Izhi2007b_IT" postCellId="../CT_L6/0/CELL_Izhi2007b_CT" weight="0.014" delay="7.39523682755 ms"/>
            <connectionWD id="1" preCellId="../IT_L5A/27/CELL_Izhi2007b_IT" postCellId="../CT_L6/0/CELL_Izhi2007b_CT" weight="0.014" delay="6.76653185198 ms"/>
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        </projection>
        <projection id="NetConn_IT_L6_PV_L6_AMPA" presynapticPopulation="IT_L6" postsynapticPopulation="PV_L6" synapse="AMPA">
            <connectionWD id="0" preCellId="../IT_L6/7/CELL_Izhi2007b_IT" postCellId="../PV_L6/0/CELL_Izhi2007b_PV" weight="0.0265" delay="3.55947169707 ms"/>
            <connectionWD id="1" preCellId="../IT_L6/10/CELL_Izhi2007b_IT" postCellId="../PV_L6/2/CELL_Izhi2007b_PV" weight="0.0265" delay="2.95311764492 ms"/>
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        </projection>
        <projection id="NetConn_IT_L5B_SOM_L23_AMPA" presynapticPopulation="IT_L5B" postsynapticPopulation="SOM_L23" synapse="AMPA">
            <connectionWD id="0" preCellId="../IT_L5B/30/CELL_Izhi2007b_IT" postCellId="../SOM_L23/0/CELL_Izhi2007b_SOM" weight="0.018125" delay="7.91810888581 ms"/>
            <connectionWD id="1" preCellId="../IT_L5B/16/CELL_Izhi2007b_IT" postCellId="../SOM_L23/1/CELL_Izhi2007b_SOM" weight="0.018125" delay="6.73191305842 ms"/>
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        </projection>
        <projection id="NetConn_CT_L6_IT_L4_AMPA" presynapticPopulation="CT_L6" postsynapticPopulation="IT_L4" synapse="AMPA">
            <connectionWD id="0" preCellId="../CT_L6/10/CELL_Izhi2007b_CT" postCellId="../IT_L4/0/CELL_Izhi2007b_IT" weight="0.00425" delay="7.98109010762 ms"/>
            <connectionWD id="1" preCellId="../CT_L6/4/CELL_Izhi2007b_CT" postCellId="../IT_L4/1/CELL_Izhi2007b_IT" weight="0.0085" delay="7.48673382398 ms"/>
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        </projection>
        <projection id="NetConn_IT_L5A_PV_L23_AMPA" presynapticPopulation="IT_L5A" postsynapticPopulation="PV_L23" synapse="AMPA">
            <connectionWD id="0" preCellId="../IT_L5A/13/CELL_Izhi2007b_IT" postCellId="../PV_L23/2/CELL_Izhi2007b_PV" weight="0.018125" delay="5.41333833719 ms"/>
            <connectionWD id="1" preCellId="../IT_L5A/24/CELL_Izhi2007b_IT" postCellId="../PV_L23/5/CELL_Izhi2007b_PV" weight="0.018125" delay="4.0725607775 ms"/>
            <connectionWD id="2" preCellId="../IT_L5A/1/CELL_Izhi2007b_IT" postCellId="../PV_L23/6/CELL_Izhi2007b_PV" weight="0.018125" delay="6.95308561755 ms"/>
            <connectionWD id="3" preCellId="../IT_L5A/23/CELL_Izhi2007b_IT" postCellId="../PV_L23/6/CELL_Izhi2007b_PV" weight="0.018125" delay="6.86728095962 ms"/>
        </projection>
        <projection id="NetConn_SOM_L6_CT_L6_GABAB" presynapticPopulation="SOM_L6" postsynapticPopulation="CT_L6" synapse="GABAB">
            <connectionWD id="0" preCellId="../SOM_L6/4/CELL_Izhi2007b_SOM" postCellId="../CT_L6/0/CELL_Izhi2007b_CT" weight="0.025" delay="3.19869868242 ms"/>
            <connectionWD id="1" preCellId="../SOM_L6/5/CELL_Izhi2007b_SOM" postCellId="../CT_L6/0/CELL_Izhi2007b_CT" weight="0.025" delay="2.74020138859 ms"/>
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        </projection>
        <projection id="NetConn_IT_L5B_SOM_L6_AMPA" presynapticPopulation="IT_L5B" postsynapticPopulation="SOM_L6" synapse="AMPA">
            <connectionWD id="0" preCellId="../IT_L5B/24/CELL_Izhi2007b_IT" postCellId="../SOM_L6/5/CELL_Izhi2007b_SOM" weight="0.021875" delay="3.86014796511 ms"/>
        </projection>
        <projection id="NetConn_IT_L5A_SOM_L5_AMPA" presynapticPopulation="IT_L5A" postsynapticPopulation="SOM_L5" synapse="AMPA">
            <connectionWD id="0" preCellId="../IT_L5A/16/CELL_Izhi2007b_IT" postCellId="../SOM_L5/0/CELL_Izhi2007b_SOM" weight="0.006125" delay="5.7631435056 ms"/>
            <connectionWD id="1" preCellId="../IT_L5A/17/CELL_Izhi2007b_IT" postCellId="../SOM_L5/0/CELL_Izhi2007b_SOM" weight="0.006125" delay="5.96620479443 ms"/>
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        </projection>
        <projection id="NetConn_SOM_L5_SOM_L5_GABAB" presynapticPopulation="SOM_L5" postsynapticPopulation="SOM_L5" synapse="GABAB">
            <connectionWD id="0" preCellId="../SOM_L5/1/CELL_Izhi2007b_SOM" postCellId="../SOM_L5/0/CELL_Izhi2007b_SOM" weight="0.025" delay="2.87677689078 ms"/>
            <connectionWD id="1" preCellId="../SOM_L5/8/CELL_Izhi2007b_SOM" postCellId="../SOM_L5/0/CELL_Izhi2007b_SOM" weight="0.025" delay="2.76212044688 ms"/>
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        </projection>
        <projection id="NetConn_IT_L23_SOM_L5_AMPA" presynapticPopulation="IT_L23" postsynapticPopulation="SOM_L5" synapse="AMPA">
            <connectionWD id="0" preCellId="../IT_L23/4/CELL_Izhi2007b_IT" postCellId="../SOM_L5/0/CELL_Izhi2007b_SOM" weight="0.0505" delay="8.10763069389 ms"/>
            <connectionWD id="1" preCellId="../IT_L23/7/CELL_Izhi2007b_IT" postCellId="../SOM_L5/0/CELL_Izhi2007b_SOM" weight="0.0505" delay="8.3348489868 ms"/>
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        </projection>
        <projection id="NetConn_IT_L5B_PV_L6_AMPA" presynapticPopulation="IT_L5B" postsynapticPopulation="PV_L6" synapse="AMPA">
            <connectionWD id="0" preCellId="../IT_L5B/16/CELL_Izhi2007b_IT" postCellId="../PV_L6/3/CELL_Izhi2007b_PV" weight="0.021875" delay="4.87886392923 ms"/>
        </projection>
        <projection id="NetConn_PV_L5_IT_L4_GABAA" presynapticPopulation="PV_L5" postsynapticPopulation="IT_L4" synapse="GABAA">
            <connectionWD id="0" preCellId="../PV_L5/8/CELL_Izhi2007b_PV" postCellId="../IT_L4/0/CELL_Izhi2007b_IT" weight="0.025" delay="2.77711451479 ms"/>
            <connectionWD id="1" preCellId="../PV_L5/9/CELL_Izhi2007b_PV" postCellId="../IT_L4/0/CELL_Izhi2007b_IT" weight="0.025" delay="2.47913745156 ms"/>
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        </projection>
        <projection id="NetConn_NetStim_background_E_IT_L6_20_1_NMDA__IT_L6" presynapticPopulation="Pop_NetStim_background_E_IT_L6_20_1_NMDA" postsynapticPopulation="IT_L6" synapse="NMDA">
            <connectionWD id="0" preCellId="../Pop_NetStim_background_E_IT_L6_20_1_NMDA[0]" postCellId="../IT_L6/0/CELL_Izhi2007b_IT" weight="0.1" delay="3.64782565431 ms"/>
            <connectionWD id="1" preCellId="../Pop_NetStim_background_E_IT_L6_20_1_NMDA[1]" postCellId="../IT_L6/1/CELL_Izhi2007b_IT" weight="0.1" delay="5.66585617687 ms"/>
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        </projection>
        <projection id="NetConn_NetStim_background_I_PV_L6_20_1_NMDA__PV_L6" presynapticPopulation="Pop_NetStim_background_I_PV_L6_20_1_NMDA" postsynapticPopulation="PV_L6" synapse="NMDA">
            <connectionWD id="0" preCellId="../Pop_NetStim_background_I_PV_L6_20_1_NMDA[0]" postCellId="../PV_L6/0/CELL_Izhi2007b_PV" weight="0.05" delay="5.45382903223 ms"/>
            <connectionWD id="1" preCellId="../Pop_NetStim_background_I_PV_L6_20_1_NMDA[1]" postCellId="../PV_L6/1/CELL_Izhi2007b_PV" weight="0.05" delay="6.88125873606 ms"/>
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        </projection>
        <projection id="NetConn_NetStim_background_E_IT_L5B_20_1_NMDA__IT_L5B" presynapticPopulation="Pop_NetStim_background_E_IT_L5B_20_1_NMDA" postsynapticPopulation="IT_L5B" synapse="NMDA">
            <connectionWD id="0" preCellId="../Pop_NetStim_background_E_IT_L5B_20_1_NMDA[0]" postCellId="../IT_L5B/0/CELL_Izhi2007b_IT" weight="0.1" delay="7.80713608379 ms"/>
            <connectionWD id="1" preCellId="../Pop_NetStim_background_E_IT_L5B_20_1_NMDA[1]" postCellId="../IT_L5B/1/CELL_Izhi2007b_IT" weight="0.1" delay="4.51710605867 ms"/>
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        </projection>
        <projection id="NetConn_NetStim_background_I_SOM_L23_20_1_NMDA__SOM_L23" presynapticPopulation="Pop_NetStim_background_I_SOM_L23_20_1_NMDA" postsynapticPopulation="SOM_L23" synapse="NMDA">
            <connectionWD id="0" preCellId="../Pop_NetStim_background_I_SOM_L23_20_1_NMDA[0]" postCellId="../SOM_L23/0/CELL_Izhi2007b_SOM" weight="0.03" delay="5.66171600277 ms"/>
            <connectionWD id="1" preCellId="../Pop_NetStim_background_I_SOM_L23_20_1_NMDA[1]" postCellId="../SOM_L23/1/CELL_Izhi2007b_SOM" weight="0.03" delay="7.41293586153 ms"/>
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        </projection>
        <projection id="NetConn_NetStim_background_E_PT_L5B_20_1_NMDA__PT_L5B" presynapticPopulation="Pop_NetStim_background_E_PT_L5B_20_1_NMDA" postsynapticPopulation="PT_L5B" synapse="NMDA">
            <connectionWD id="0" preCellId="../Pop_NetStim_background_E_PT_L5B_20_1_NMDA[0]" postCellId="../PT_L5B/0/CELL_Izhi2007b_PT" weight="0.1" delay="-0.804210189883 ms"/>
            <connectionWD id="1" preCellId="../Pop_NetStim_background_E_PT_L5B_20_1_NMDA[1]" postCellId="../PT_L5B/1/CELL_Izhi2007b_PT" weight="0.1" delay="4.71517003455 ms"/>
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        </projection>
        <projection id="NetConn_NetStim_background_E_IT_L4_20_1_NMDA__IT_L4" presynapticPopulation="Pop_NetStim_background_E_IT_L4_20_1_NMDA" postsynapticPopulation="IT_L4" synapse="NMDA">
            <connectionWD id="0" preCellId="../Pop_NetStim_background_E_IT_L4_20_1_NMDA[0]" postCellId="../IT_L4/0/CELL_Izhi2007b_IT" weight="0.1" delay="4.73777373968 ms"/>
            <connectionWD id="1" preCellId="../Pop_NetStim_background_E_IT_L4_20_1_NMDA[1]" postCellId="../IT_L4/1/CELL_Izhi2007b_IT" weight="0.1" delay="6.42940996321 ms"/>
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        </projection>
        <projection id="NetConn_NetStim_background_I_PV_L23_20_1_NMDA__PV_L23" presynapticPopulation="Pop_NetStim_background_I_PV_L23_20_1_NMDA" postsynapticPopulation="PV_L23" synapse="NMDA">
            <connectionWD id="0" preCellId="../Pop_NetStim_background_I_PV_L23_20_1_NMDA[0]" postCellId="../PV_L23/0/CELL_Izhi2007b_PV" weight="0.05" delay="6.36477269006 ms"/>
            <connectionWD id="1" preCellId="../Pop_NetStim_background_I_PV_L23_20_1_NMDA[1]" postCellId="../PV_L23/1/CELL_Izhi2007b_PV" weight="0.05" delay="2.70311209405 ms"/>
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        </projection>
        <projection id="NetConn_NetStim_background_I_SOM_L6_20_1_NMDA__SOM_L6" presynapticPopulation="Pop_NetStim_background_I_SOM_L6_20_1_NMDA" postsynapticPopulation="SOM_L6" synapse="NMDA">
            <connectionWD id="0" preCellId="../Pop_NetStim_background_I_SOM_L6_20_1_NMDA[0]" postCellId="../SOM_L6/0/CELL_Izhi2007b_SOM" weight="0.03" delay="6.8462255573 ms"/>
            <connectionWD id="1" preCellId="../Pop_NetStim_background_I_SOM_L6_20_1_NMDA[1]" postCellId="../SOM_L6/1/CELL_Izhi2007b_SOM" weight="0.03" delay="2.8447195764 ms"/>
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        </projection>
        <projection id="NetConn_NetStim_background_E_CT_L6_20_1_NMDA__CT_L6" presynapticPopulation="Pop_NetStim_background_E_CT_L6_20_1_NMDA" postsynapticPopulation="CT_L6" synapse="NMDA">
            <connectionWD id="0" preCellId="../Pop_NetStim_background_E_CT_L6_20_1_NMDA[0]" postCellId="../CT_L6/0/CELL_Izhi2007b_CT" weight="0.1" delay="3.11618360623 ms"/>
            <connectionWD id="1" preCellId="../Pop_NetStim_background_E_CT_L6_20_1_NMDA[1]" postCellId="../CT_L6/1/CELL_Izhi2007b_CT" weight="0.1" delay="2.10247068851 ms"/>
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        </projection>
        <projection id="NetConn_NetStim_background_E_IT_L23_20_1_NMDA__IT_L23" presynapticPopulation="Pop_NetStim_background_E_IT_L23_20_1_NMDA" postsynapticPopulation="IT_L23" synapse="NMDA">
            <connectionWD id="0" preCellId="../Pop_NetStim_background_E_IT_L23_20_1_NMDA[0]" postCellId="../IT_L23/0/CELL_Izhi2007b_IT" weight="0.1" delay="7.36605260425 ms"/>
            <connectionWD id="1" preCellId="../Pop_NetStim_background_E_IT_L23_20_1_NMDA[1]" postCellId="../IT_L23/1/CELL_Izhi2007b_IT" weight="0.1" delay="7.61731377992 ms"/>
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        </projection>
        <projection id="NetConn_NetStim_background_I_SOM_L5_20_1_NMDA__SOM_L5" presynapticPopulation="Pop_NetStim_background_I_SOM_L5_20_1_NMDA" postsynapticPopulation="SOM_L5" synapse="NMDA">
            <connectionWD id="0" preCellId="../Pop_NetStim_background_I_SOM_L5_20_1_NMDA[0]" postCellId="../SOM_L5/0/CELL_Izhi2007b_SOM" weight="0.03" delay="4.04044109209 ms"/>
            <connectionWD id="1" preCellId="../Pop_NetStim_background_I_SOM_L5_20_1_NMDA[1]" postCellId="../SOM_L5/1/CELL_Izhi2007b_SOM" weight="0.03" delay="4.61023539917 ms"/>
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        </projection>
        <projection id="NetConn_NetStim_background_E_IT_L5A_20_1_NMDA__IT_L5A" presynapticPopulation="Pop_NetStim_background_E_IT_L5A_20_1_NMDA" postsynapticPopulation="IT_L5A" synapse="NMDA">
            <connectionWD id="0" preCellId="../Pop_NetStim_background_E_IT_L5A_20_1_NMDA[0]" postCellId="../IT_L5A/0/CELL_Izhi2007b_IT" weight="0.1" delay="1.75656230362 ms"/>
            <connectionWD id="1" preCellId="../Pop_NetStim_background_E_IT_L5A_20_1_NMDA[1]" postCellId="../IT_L5A/1/CELL_Izhi2007b_IT" weight="0.1" delay="7.1005913071 ms"/>
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        </projection>
        <projection id="NetConn_NetStim_background_I_PV_L5_20_1_NMDA__PV_L5" presynapticPopulation="Pop_NetStim_background_I_PV_L5_20_1_NMDA" postsynapticPopulation="PV_L5" synapse="NMDA">
            <connectionWD id="0" preCellId="../Pop_NetStim_background_I_PV_L5_20_1_NMDA[0]" postCellId="../PV_L5/0/CELL_Izhi2007b_PV" weight="0.05" delay="2.7087450854 ms"/>
            <connectionWD id="1" preCellId="../Pop_NetStim_background_I_PV_L5_20_1_NMDA[1]" postCellId="../PV_L5/1/CELL_Izhi2007b_PV" weight="0.05" delay="2.27997215457 ms"/>
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        </projection>
    </network>
</neuroml>
