<Lems>

    <!--

        This LEMS file has been automatically generated using PyNeuroML v0.5.18 (libNeuroML v0.2.58)

     -->

    <!-- Specify which component to run -->
    <Target component="Sim_DendConn"/>

    <!-- Include core NeuroML2 ComponentType definitions -->
    <Include file="Cells.xml"/>
    <Include file="Networks.xml"/>
    <Include file="Simulation.xml"/>

    <Include file="DendConn/pyr_4_sym.cell.nml"/>
    <Include file="DendConn/Ca_conc.nml"/>
    <Include file="DendConn/Ca_pyr.channel.nml"/>
    <Include file="DendConn/Kahp_pyr.channel.nml"/>
    <Include file="DendConn/Kdr_pyr.channel.nml"/>
    <Include file="DendConn/LeakConductance_pyr.channel.nml"/>
    <Include file="DendConn/Na_pyr.channel.nml"/>
    <Include file="DendConn/bask.cell.nml"/>
    <Include file="DendConn/Kdr_bask.channel.nml"/>
    <Include file="DendConn/LeakConductance_bask.channel.nml"/>
    <Include file="DendConn/Na_bask.channel.nml"/>
    <Include file="DendConn.net.nml"/>

    <Simulation id="Sim_DendConn" length="500ms" step="0.025ms" target="DendConn" seed="12345">  <!-- Note seed: ensures same random numbers used every run -->

        <Display id="Display_pop_pyr_v" title="Plots of Display_pop_pyr_v" timeScale="1ms" xmin="-50.0" xmax="550.0" ymin="-80" ymax="40">
            <Line id="pop_pyr_0_pyr_4_sym_0_v" quantity="pop_pyr/0/pyr_4_sym/0/v" scale="1mV" color="#d54f33" timeScale="1ms"/>
            <Line id="pop_pyr_1_pyr_4_sym_0_v" quantity="pop_pyr/1/pyr_4_sym/0/v" scale="1mV" color="#0534e4" timeScale="1ms"/>
            <Line id="pop_pyr_2_pyr_4_sym_0_v" quantity="pop_pyr/2/pyr_4_sym/0/v" scale="1mV" color="#98e752" timeScale="1ms"/>
            <Line id="pop_pyr_3_pyr_4_sym_0_v" quantity="pop_pyr/3/pyr_4_sym/0/v" scale="1mV" color="#bca074" timeScale="1ms"/>
        </Display>

        <OutputFile id="Sim_DendConn_pop_pyr_v_dat" fileName="Sim_DendConn.pop_pyr.v.dat">
            <OutputColumn id="pop_pyr_0_pyr_4_sym_0_v" quantity="pop_pyr/0/pyr_4_sym/0/v"/>
            <OutputColumn id="pop_pyr_1_pyr_4_sym_0_v" quantity="pop_pyr/1/pyr_4_sym/0/v"/>
            <OutputColumn id="pop_pyr_2_pyr_4_sym_0_v" quantity="pop_pyr/2/pyr_4_sym/0/v"/>
            <OutputColumn id="pop_pyr_3_pyr_4_sym_0_v" quantity="pop_pyr/3/pyr_4_sym/0/v"/>
        </OutputFile>

    </Simulation>

</Lems>
