<neuroml xmlns="http://www.neuroml.org/schema/neuroml2"  xmlns:xs="http://www.w3.org/2001/XMLSchema" xmlns:xsi="http://www.w3.org/2001/XMLSchema-instance" xsi:schemaLocation="http://www.neuroml.org/schema/neuroml2 https://raw.github.com/NeuroML/NeuroML2/development/Schemas/NeuroML2/NeuroML_v2beta5.xsd" id="Balanced">
    <notes>

This NeuroML 2 file was generated by OpenCortex v0.1.3 using:
    libNeuroML v0.2.33
    pyNeuroML v0.3.1

    </notes>
    <property tag="Network seed" value="1234"/>
    <include href="Balanced/HH_477127614.cell.nml"></include>
    <include href="Balanced/IMchan.channel.nml"></include>
    <include href="Balanced/Kd.channel.nml"></include>
    <include href="Balanced/Leak.channel.nml"></include>
    <include href="Balanced/Na.channel.nml"></include>
    <include href="Balanced/HH_476686112.cell.nml"></include>
    <expTwoSynapse id="synAmpa1" gbase="1nS" erev="0mV" tauDecay="5ms" tauRise="0.5ms"/>
    <expTwoSynapse id="synGaba1" gbase="2nS" erev="-80mV" tauDecay="20ms" tauRise="1ms"/>
    <pulseGenerator id="pg_0" delay="0ms" duration="10000ms" amplitude="0.217392694277nA"/>
    <pulseGenerator id="pg_1" delay="0ms" duration="10000ms" amplitude="0.431852826261nA"/>
    <pulseGenerator id="pg_2" delay="0ms" duration="10000ms" amplitude="0.3494573294nA"/>
    <pulseGenerator id="pg_3" delay="0ms" duration="10000ms" amplitude="0.0493038197733nA"/>
    <pulseGenerator id="pg_4" delay="0ms" duration="10000ms" amplitude="0.282812662242nA"/>
    <pulseGenerator id="pg_5" delay="0ms" duration="10000ms" amplitude="0.295928109774nA"/>
    <pulseGenerator id="pg_6" delay="0ms" duration="10000ms" amplitude="0.356455011239nA"/>
    <pulseGenerator id="pg_7" delay="0ms" duration="10000ms" amplitude="0.164475997834nA"/>
    <pulseGenerator id="pg_8" delay="0ms" duration="10000ms" amplitude="0.231085526058nA"/>
    <pulseGenerator id="pg_9" delay="0ms" duration="10000ms" amplitude="0.0946031566859nA"/>
    <pulseGenerator id="pg_10" delay="0ms" duration="10000ms" amplitude="0.208279092365nA"/>
    <pulseGenerator id="pg_11" delay="0ms" duration="10000ms" amplitude="0.338738520359nA"/>
    <pulseGenerator id="pg_12" delay="0ms" duration="10000ms" amplitude="0.343286358662nA"/>
    <pulseGenerator id="pg_13" delay="0ms" duration="10000ms" amplitude="0.281107781736nA"/>
    <pulseGenerator id="pg_14" delay="0ms" duration="10000ms" amplitude="0.0239165339613nA"/>
    <pulseGenerator id="pg_15" delay="0ms" duration="10000ms" amplitude="0.31024764329nA"/>
    <pulseGenerator id="pg_16" delay="0ms" duration="10000ms" amplitude="0.0674127626157nA"/>
    <pulseGenerator id="pg_17" delay="0ms" duration="10000ms" amplitude="0.0232361953379nA"/>
    <pulseGenerator id="pg_18" delay="0ms" duration="10000ms" amplitude="0.389173818583nA"/>
    <pulseGenerator id="pg_19" delay="0ms" duration="10000ms" amplitude="0.343994574977nA"/>
    <pulseGenerator id="pg_20" delay="0ms" duration="10000ms" amplitude="0.405518933284nA"/>
    <pulseGenerator id="pg_21" delay="0ms" duration="10000ms" amplitude="0.00143855454808nA"/>
    <pulseGenerator id="pg_22" delay="0ms" duration="10000ms" amplitude="0.286588583425nA"/>
    <pulseGenerator id="pg_23" delay="0ms" duration="10000ms" amplitude="0.105811088048nA"/>
    <pulseGenerator id="pg_24" delay="0ms" duration="10000ms" amplitude="0.403260476734nA"/>
    <pulseGenerator id="pg_25" delay="0ms" duration="10000ms" amplitude="0.487791833243nA"/>
    <pulseGenerator id="pg_26" delay="0ms" duration="10000ms" amplitude="0.347655597935nA"/>
    <pulseGenerator id="pg_27" delay="0ms" duration="10000ms" amplitude="0.457924275748nA"/>
    <pulseGenerator id="pg_28" delay="0ms" duration="10000ms" amplitude="0.260307070284nA"/>
    <pulseGenerator id="pg_29" delay="0ms" duration="10000ms" amplitude="0.0223384898321nA"/>
    <pulseGenerator id="pg_30" delay="0ms" duration="10000ms" amplitude="0.437517853394nA"/>
    <pulseGenerator id="pg_31" delay="0ms" duration="10000ms" amplitude="0.214837647276nA"/>
    <pulseGenerator id="pg_32" delay="0ms" duration="10000ms" amplitude="0.397432263684nA"/>
    <pulseGenerator id="pg_33" delay="0ms" duration="10000ms" amplitude="0.471641899601nA"/>
    <pulseGenerator id="pg_34" delay="0ms" duration="10000ms" amplitude="0.416973099498nA"/>
    <pulseGenerator id="pg_35" delay="0ms" duration="10000ms" amplitude="0.132878334554nA"/>
    <pulseGenerator id="pg_36" delay="0ms" duration="10000ms" amplitude="0.0532354578513nA"/>
    <pulseGenerator id="pg_37" delay="0ms" duration="10000ms" amplitude="0.410651192874nA"/>
    <pulseGenerator id="pg_38" delay="0ms" duration="10000ms" amplitude="0.413750567887nA"/>
    <pulseGenerator id="pg_39" delay="0ms" duration="10000ms" amplitude="0.0385231291011nA"/>
    <pulseGenerator id="pg_40" delay="0ms" duration="10000ms" amplitude="0.0339212288383nA"/>
    <pulseGenerator id="pg_41" delay="0ms" duration="10000ms" amplitude="0.399180717894nA"/>
    <pulseGenerator id="pg_42" delay="0ms" duration="10000ms" amplitude="0.291772246893nA"/>
    <pulseGenerator id="pg_43" delay="0ms" duration="10000ms" amplitude="0.482542905939nA"/>
    <pulseGenerator id="pg_44" delay="0ms" duration="10000ms" amplitude="0.43829569239nA"/>
    <pulseGenerator id="pg_45" delay="0ms" duration="10000ms" amplitude="0.189317444326nA"/>
    <pulseGenerator id="pg_46" delay="0ms" duration="10000ms" amplitude="0.0694695922599nA"/>
    <pulseGenerator id="pg_47" delay="0ms" duration="10000ms" amplitude="0.105013794521nA"/>
    <pulseGenerator id="pg_48" delay="0ms" duration="10000ms" amplitude="0.34978636406nA"/>
    <pulseGenerator id="pg_49" delay="0ms" duration="10000ms" amplitude="0.00632008450367nA"/>
    <pulseGenerator id="pg_50" delay="0ms" duration="10000ms" amplitude="0.257375945285nA"/>
    <pulseGenerator id="pg_51" delay="0ms" duration="10000ms" amplitude="0.463942604232nA"/>
    <pulseGenerator id="pg_52" delay="0ms" duration="10000ms" amplitude="0.338512284281nA"/>
    <pulseGenerator id="pg_53" delay="0ms" duration="10000ms" amplitude="0.405734633227nA"/>
    <pulseGenerator id="pg_54" delay="0ms" duration="10000ms" amplitude="0.455041145394nA"/>
    <pulseGenerator id="pg_55" delay="0ms" duration="10000ms" amplitude="0.423169485851nA"/>
    <pulseGenerator id="pg_56" delay="0ms" duration="10000ms" amplitude="0.324957146538nA"/>
    <pulseGenerator id="pg_57" delay="0ms" duration="10000ms" amplitude="0.340544642181nA"/>
    <pulseGenerator id="pg_58" delay="0ms" duration="10000ms" amplitude="0.111098358656nA"/>
    <pulseGenerator id="pg_59" delay="0ms" duration="10000ms" amplitude="0.0109265409987nA"/>
    <pulseGenerator id="pg_60" delay="0ms" duration="10000ms" amplitude="0.0847490653981nA"/>
    <pulseGenerator id="pg_61" delay="0ms" duration="10000ms" amplitude="0.471549936445nA"/>
    <pulseGenerator id="pg_62" delay="0ms" duration="10000ms" amplitude="0.162319827248nA"/>
    <pulseGenerator id="pg_63" delay="0ms" duration="10000ms" amplitude="0.111254713271nA"/>
    <pulseGenerator id="pg_64" delay="0ms" duration="10000ms" amplitude="0.0801594412094nA"/>
    <pulseGenerator id="pg_65" delay="0ms" duration="10000ms" amplitude="0.373204131934nA"/>
    <pulseGenerator id="pg_66" delay="0ms" duration="10000ms" amplitude="0.476083197428nA"/>
    <pulseGenerator id="pg_67" delay="0ms" duration="10000ms" amplitude="0.277996754905nA"/>
    <pulseGenerator id="pg_68" delay="0ms" duration="10000ms" amplitude="0.286580802697nA"/>
    <pulseGenerator id="pg_69" delay="0ms" duration="10000ms" amplitude="0.234767024894nA"/>
    <pulseGenerator id="pg_70" delay="0ms" duration="10000ms" amplitude="0.0577842331263nA"/>
    <pulseGenerator id="pg_71" delay="0ms" duration="10000ms" amplitude="0.464130490579nA"/>
    <pulseGenerator id="pg_72" delay="0ms" duration="10000ms" amplitude="0.413844856704nA"/>
    <pulseGenerator id="pg_73" delay="0ms" duration="10000ms" amplitude="0.217763435049nA"/>
    <pulseGenerator id="pg_74" delay="0ms" duration="10000ms" amplitude="0.16995572989nA"/>
    <pulseGenerator id="pg_75" delay="0ms" duration="10000ms" amplitude="0.35717468459nA"/>
    <pulseGenerator id="pg_76" delay="0ms" duration="10000ms" amplitude="0.106331834778nA"/>
    <pulseGenerator id="pg_77" delay="0ms" duration="10000ms" amplitude="0.11678852205nA"/>
    <pulseGenerator id="pg_78" delay="0ms" duration="10000ms" amplitude="0.413382706537nA"/>
    <pulseGenerator id="pg_79" delay="0ms" duration="10000ms" amplitude="0.140333012412nA"/>
    <network id="Balanced" type="networkWithTemperature" temperature="32degC">
        <population id="popExc" component="HH_477127614" size="80" type="populationList">
            <instance id="0">
                <location x="186.581414276999993" y="70.366299587699999" z="102.247441018000004"/>
            </instance>
            <instance id="1">
                <location x="164.390384979999993" y="319.634498682000014" z="274.668271918000016"/>
            </instance>
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        </population>
        <population id="popInh" component="HH_476686112" size="40" type="populationList">
            <instance id="0">
                <location x="-134.986282950999993" y="99.708014297999995" z="382.014422138999976"/>
            </instance>
            <instance id="1">
                <location x="180.073079441999994" y="-80.0306592962" z="259.694135091000021"/>
            </instance>
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        </population>
        <projection id="proj0_popExc_popExc" presynapticPopulation="popExc" postsynapticPopulation="popExc" synapse="synAmpa1">
            <connectionWD id="0" preCellId="../popExc/0/HH_477127614" postCellId="../popExc/9/HH_477127614" weight="1." delay="2 ms"/>
            <connectionWD id="1" preCellId="../popExc/0/HH_477127614" postCellId="../popExc/10/HH_477127614" weight="1." delay="2 ms"/>
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        </projection>
        <projection id="proj1_popExc_popInh" presynapticPopulation="popExc" postsynapticPopulation="popInh" synapse="synAmpa1">
            <connectionWD id="0" preCellId="../popExc/0/HH_477127614" postCellId="../popInh/0/HH_476686112" weight="1." delay="2 ms"/>
            <connectionWD id="1" preCellId="../popExc/0/HH_477127614" postCellId="../popInh/3/HH_476686112" weight="1." delay="2 ms"/>
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        </projection>
        <projection id="proj3_popInh_popExc" presynapticPopulation="popInh" postsynapticPopulation="popExc" synapse="synGaba1">
            <connectionWD id="0" preCellId="../popInh/0/HH_476686112" postCellId="../popExc/0/HH_477127614" weight="1." delay="2 ms"/>
            <connectionWD id="1" preCellId="../popInh/0/HH_476686112" postCellId="../popExc/1/HH_477127614" weight="1." delay="2 ms"/>
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        </projection>
        <projection id="proj4_popInh_popInh" presynapticPopulation="popInh" postsynapticPopulation="popInh" synapse="synGaba1">
            <connectionWD id="0" preCellId="../popInh/0/HH_476686112" postCellId="../popInh/1/HH_476686112" weight="1." delay="2 ms"/>
            <connectionWD id="1" preCellId="../popInh/0/HH_476686112" postCellId="../popInh/3/HH_476686112" weight="1." delay="2 ms"/>
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        </projection>
        <inputList id="Stim_0" population="popExc" component="pg_0">
            <input id="0" target="../popExc/0/HH_477127614" destination="synapses" segmentId="0" fractionAlong="0.5"/>
        </inputList>
        <inputList id="Stim_1" population="popExc" component="pg_1">
            <input id="0" target="../popExc/1/HH_477127614" destination="synapses" segmentId="0" fractionAlong="0.5"/>
        </inputList>
        <inputList id="Stim_2" population="popExc" component="pg_2">
            <input id="0" target="../popExc/2/HH_477127614" destination="synapses" segmentId="0" fractionAlong="0.5"/>
        </inputList>
        <inputList id="Stim_3" population="popExc" component="pg_3">
            <input id="0" target="../popExc/3/HH_477127614" destination="synapses" segmentId="0" fractionAlong="0.5"/>
        </inputList>
        <inputList id="Stim_4" population="popExc" component="pg_4">
            <input id="0" target="../popExc/4/HH_477127614" destination="synapses" segmentId="0" fractionAlong="0.5"/>
        </inputList>
        <inputList id="Stim_5" population="popExc" component="pg_5">
            <input id="0" target="../popExc/5/HH_477127614" destination="synapses" segmentId="0" fractionAlong="0.5"/>
        </inputList>
        <inputList id="Stim_6" population="popExc" component="pg_6">
            <input id="0" target="../popExc/6/HH_477127614" destination="synapses" segmentId="0" fractionAlong="0.5"/>
        </inputList>
        <inputList id="Stim_7" population="popExc" component="pg_7">
            <input id="0" target="../popExc/7/HH_477127614" destination="synapses" segmentId="0" fractionAlong="0.5"/>
        </inputList>
        <inputList id="Stim_8" population="popExc" component="pg_8">
            <input id="0" target="../popExc/8/HH_477127614" destination="synapses" segmentId="0" fractionAlong="0.5"/>
        </inputList>
        <inputList id="Stim_9" population="popExc" component="pg_9">
            <input id="0" target="../popExc/9/HH_477127614" destination="synapses" segmentId="0" fractionAlong="0.5"/>
        </inputList>
        <inputList id="Stim_10" population="popExc" component="pg_10">
            <input id="0" target="../popExc/10/HH_477127614" destination="synapses" segmentId="0" fractionAlong="0.5"/>
        </inputList>
        <inputList id="Stim_11" population="popExc" component="pg_11">
            <input id="0" target="../popExc/11/HH_477127614" destination="synapses" segmentId="0" fractionAlong="0.5"/>
        </inputList>
        <inputList id="Stim_12" population="popExc" component="pg_12">
            <input id="0" target="../popExc/12/HH_477127614" destination="synapses" segmentId="0" fractionAlong="0.5"/>
        </inputList>
        <inputList id="Stim_13" population="popExc" component="pg_13">
            <input id="0" target="../popExc/13/HH_477127614" destination="synapses" segmentId="0" fractionAlong="0.5"/>
        </inputList>
        <inputList id="Stim_14" population="popExc" component="pg_14">
            <input id="0" target="../popExc/14/HH_477127614" destination="synapses" segmentId="0" fractionAlong="0.5"/>
        </inputList>
        <inputList id="Stim_15" population="popExc" component="pg_15">
            <input id="0" target="../popExc/15/HH_477127614" destination="synapses" segmentId="0" fractionAlong="0.5"/>
        </inputList>
        <inputList id="Stim_16" population="popExc" component="pg_16">
            <input id="0" target="../popExc/16/HH_477127614" destination="synapses" segmentId="0" fractionAlong="0.5"/>
        </inputList>
        <inputList id="Stim_17" population="popExc" component="pg_17">
            <input id="0" target="../popExc/17/HH_477127614" destination="synapses" segmentId="0" fractionAlong="0.5"/>
        </inputList>
        <inputList id="Stim_18" population="popExc" component="pg_18">
            <input id="0" target="../popExc/18/HH_477127614" destination="synapses" segmentId="0" fractionAlong="0.5"/>
        </inputList>
        <inputList id="Stim_19" population="popExc" component="pg_19">
            <input id="0" target="../popExc/19/HH_477127614" destination="synapses" segmentId="0" fractionAlong="0.5"/>
        </inputList>
        <inputList id="Stim_20" population="popExc" component="pg_20">
            <input id="0" target="../popExc/20/HH_477127614" destination="synapses" segmentId="0" fractionAlong="0.5"/>
        </inputList>
        <inputList id="Stim_21" population="popExc" component="pg_21">
            <input id="0" target="../popExc/21/HH_477127614" destination="synapses" segmentId="0" fractionAlong="0.5"/>
        </inputList>
        <inputList id="Stim_22" population="popExc" component="pg_22">
            <input id="0" target="../popExc/22/HH_477127614" destination="synapses" segmentId="0" fractionAlong="0.5"/>
        </inputList>
        <inputList id="Stim_23" population="popExc" component="pg_23">
            <input id="0" target="../popExc/23/HH_477127614" destination="synapses" segmentId="0" fractionAlong="0.5"/>
        </inputList>
        <inputList id="Stim_24" population="popExc" component="pg_24">
            <input id="0" target="../popExc/24/HH_477127614" destination="synapses" segmentId="0" fractionAlong="0.5"/>
        </inputList>
        <inputList id="Stim_25" population="popExc" component="pg_25">
            <input id="0" target="../popExc/25/HH_477127614" destination="synapses" segmentId="0" fractionAlong="0.5"/>
        </inputList>
        <inputList id="Stim_26" population="popExc" component="pg_26">
            <input id="0" target="../popExc/26/HH_477127614" destination="synapses" segmentId="0" fractionAlong="0.5"/>
        </inputList>
        <inputList id="Stim_27" population="popExc" component="pg_27">
            <input id="0" target="../popExc/27/HH_477127614" destination="synapses" segmentId="0" fractionAlong="0.5"/>
        </inputList>
        <inputList id="Stim_28" population="popExc" component="pg_28">
            <input id="0" target="../popExc/28/HH_477127614" destination="synapses" segmentId="0" fractionAlong="0.5"/>
        </inputList>
        <inputList id="Stim_29" population="popExc" component="pg_29">
            <input id="0" target="../popExc/29/HH_477127614" destination="synapses" segmentId="0" fractionAlong="0.5"/>
        </inputList>
        <inputList id="Stim_30" population="popExc" component="pg_30">
            <input id="0" target="../popExc/30/HH_477127614" destination="synapses" segmentId="0" fractionAlong="0.5"/>
        </inputList>
        <inputList id="Stim_31" population="popExc" component="pg_31">
            <input id="0" target="../popExc/31/HH_477127614" destination="synapses" segmentId="0" fractionAlong="0.5"/>
        </inputList>
        <inputList id="Stim_32" population="popExc" component="pg_32">
            <input id="0" target="../popExc/32/HH_477127614" destination="synapses" segmentId="0" fractionAlong="0.5"/>
        </inputList>
        <inputList id="Stim_33" population="popExc" component="pg_33">
            <input id="0" target="../popExc/33/HH_477127614" destination="synapses" segmentId="0" fractionAlong="0.5"/>
        </inputList>
        <inputList id="Stim_34" population="popExc" component="pg_34">
            <input id="0" target="../popExc/34/HH_477127614" destination="synapses" segmentId="0" fractionAlong="0.5"/>
        </inputList>
        <inputList id="Stim_35" population="popExc" component="pg_35">
            <input id="0" target="../popExc/35/HH_477127614" destination="synapses" segmentId="0" fractionAlong="0.5"/>
        </inputList>
        <inputList id="Stim_36" population="popExc" component="pg_36">
            <input id="0" target="../popExc/36/HH_477127614" destination="synapses" segmentId="0" fractionAlong="0.5"/>
        </inputList>
        <inputList id="Stim_37" population="popExc" component="pg_37">
            <input id="0" target="../popExc/37/HH_477127614" destination="synapses" segmentId="0" fractionAlong="0.5"/>
        </inputList>
        <inputList id="Stim_38" population="popExc" component="pg_38">
            <input id="0" target="../popExc/38/HH_477127614" destination="synapses" segmentId="0" fractionAlong="0.5"/>
        </inputList>
        <inputList id="Stim_39" population="popExc" component="pg_39">
            <input id="0" target="../popExc/39/HH_477127614" destination="synapses" segmentId="0" fractionAlong="0.5"/>
        </inputList>
        <inputList id="Stim_40" population="popExc" component="pg_40">
            <input id="0" target="../popExc/40/HH_477127614" destination="synapses" segmentId="0" fractionAlong="0.5"/>
        </inputList>
        <inputList id="Stim_41" population="popExc" component="pg_41">
            <input id="0" target="../popExc/41/HH_477127614" destination="synapses" segmentId="0" fractionAlong="0.5"/>
        </inputList>
        <inputList id="Stim_42" population="popExc" component="pg_42">
            <input id="0" target="../popExc/42/HH_477127614" destination="synapses" segmentId="0" fractionAlong="0.5"/>
        </inputList>
        <inputList id="Stim_43" population="popExc" component="pg_43">
            <input id="0" target="../popExc/43/HH_477127614" destination="synapses" segmentId="0" fractionAlong="0.5"/>
        </inputList>
        <inputList id="Stim_44" population="popExc" component="pg_44">
            <input id="0" target="../popExc/44/HH_477127614" destination="synapses" segmentId="0" fractionAlong="0.5"/>
        </inputList>
        <inputList id="Stim_45" population="popExc" component="pg_45">
            <input id="0" target="../popExc/45/HH_477127614" destination="synapses" segmentId="0" fractionAlong="0.5"/>
        </inputList>
        <inputList id="Stim_46" population="popExc" component="pg_46">
            <input id="0" target="../popExc/46/HH_477127614" destination="synapses" segmentId="0" fractionAlong="0.5"/>
        </inputList>
        <inputList id="Stim_47" population="popExc" component="pg_47">
            <input id="0" target="../popExc/47/HH_477127614" destination="synapses" segmentId="0" fractionAlong="0.5"/>
        </inputList>
        <inputList id="Stim_48" population="popExc" component="pg_48">
            <input id="0" target="../popExc/48/HH_477127614" destination="synapses" segmentId="0" fractionAlong="0.5"/>
        </inputList>
        <inputList id="Stim_49" population="popExc" component="pg_49">
            <input id="0" target="../popExc/49/HH_477127614" destination="synapses" segmentId="0" fractionAlong="0.5"/>
        </inputList>
        <inputList id="Stim_50" population="popExc" component="pg_50">
            <input id="0" target="../popExc/50/HH_477127614" destination="synapses" segmentId="0" fractionAlong="0.5"/>
        </inputList>
        <inputList id="Stim_51" population="popExc" component="pg_51">
            <input id="0" target="../popExc/51/HH_477127614" destination="synapses" segmentId="0" fractionAlong="0.5"/>
        </inputList>
        <inputList id="Stim_52" population="popExc" component="pg_52">
            <input id="0" target="../popExc/52/HH_477127614" destination="synapses" segmentId="0" fractionAlong="0.5"/>
        </inputList>
        <inputList id="Stim_53" population="popExc" component="pg_53">
            <input id="0" target="../popExc/53/HH_477127614" destination="synapses" segmentId="0" fractionAlong="0.5"/>
        </inputList>
        <inputList id="Stim_54" population="popExc" component="pg_54">
            <input id="0" target="../popExc/54/HH_477127614" destination="synapses" segmentId="0" fractionAlong="0.5"/>
        </inputList>
        <inputList id="Stim_55" population="popExc" component="pg_55">
            <input id="0" target="../popExc/55/HH_477127614" destination="synapses" segmentId="0" fractionAlong="0.5"/>
        </inputList>
        <inputList id="Stim_56" population="popExc" component="pg_56">
            <input id="0" target="../popExc/56/HH_477127614" destination="synapses" segmentId="0" fractionAlong="0.5"/>
        </inputList>
        <inputList id="Stim_57" population="popExc" component="pg_57">
            <input id="0" target="../popExc/57/HH_477127614" destination="synapses" segmentId="0" fractionAlong="0.5"/>
        </inputList>
        <inputList id="Stim_58" population="popExc" component="pg_58">
            <input id="0" target="../popExc/58/HH_477127614" destination="synapses" segmentId="0" fractionAlong="0.5"/>
        </inputList>
        <inputList id="Stim_59" population="popExc" component="pg_59">
            <input id="0" target="../popExc/59/HH_477127614" destination="synapses" segmentId="0" fractionAlong="0.5"/>
        </inputList>
        <inputList id="Stim_60" population="popExc" component="pg_60">
            <input id="0" target="../popExc/60/HH_477127614" destination="synapses" segmentId="0" fractionAlong="0.5"/>
        </inputList>
        <inputList id="Stim_61" population="popExc" component="pg_61">
            <input id="0" target="../popExc/61/HH_477127614" destination="synapses" segmentId="0" fractionAlong="0.5"/>
        </inputList>
        <inputList id="Stim_62" population="popExc" component="pg_62">
            <input id="0" target="../popExc/62/HH_477127614" destination="synapses" segmentId="0" fractionAlong="0.5"/>
        </inputList>
        <inputList id="Stim_63" population="popExc" component="pg_63">
            <input id="0" target="../popExc/63/HH_477127614" destination="synapses" segmentId="0" fractionAlong="0.5"/>
        </inputList>
        <inputList id="Stim_64" population="popExc" component="pg_64">
            <input id="0" target="../popExc/64/HH_477127614" destination="synapses" segmentId="0" fractionAlong="0.5"/>
        </inputList>
        <inputList id="Stim_65" population="popExc" component="pg_65">
            <input id="0" target="../popExc/65/HH_477127614" destination="synapses" segmentId="0" fractionAlong="0.5"/>
        </inputList>
        <inputList id="Stim_66" population="popExc" component="pg_66">
            <input id="0" target="../popExc/66/HH_477127614" destination="synapses" segmentId="0" fractionAlong="0.5"/>
        </inputList>
        <inputList id="Stim_67" population="popExc" component="pg_67">
            <input id="0" target="../popExc/67/HH_477127614" destination="synapses" segmentId="0" fractionAlong="0.5"/>
        </inputList>
        <inputList id="Stim_68" population="popExc" component="pg_68">
            <input id="0" target="../popExc/68/HH_477127614" destination="synapses" segmentId="0" fractionAlong="0.5"/>
        </inputList>
        <inputList id="Stim_69" population="popExc" component="pg_69">
            <input id="0" target="../popExc/69/HH_477127614" destination="synapses" segmentId="0" fractionAlong="0.5"/>
        </inputList>
        <inputList id="Stim_70" population="popExc" component="pg_70">
            <input id="0" target="../popExc/70/HH_477127614" destination="synapses" segmentId="0" fractionAlong="0.5"/>
        </inputList>
        <inputList id="Stim_71" population="popExc" component="pg_71">
            <input id="0" target="../popExc/71/HH_477127614" destination="synapses" segmentId="0" fractionAlong="0.5"/>
        </inputList>
        <inputList id="Stim_72" population="popExc" component="pg_72">
            <input id="0" target="../popExc/72/HH_477127614" destination="synapses" segmentId="0" fractionAlong="0.5"/>
        </inputList>
        <inputList id="Stim_73" population="popExc" component="pg_73">
            <input id="0" target="../popExc/73/HH_477127614" destination="synapses" segmentId="0" fractionAlong="0.5"/>
        </inputList>
        <inputList id="Stim_74" population="popExc" component="pg_74">
            <input id="0" target="../popExc/74/HH_477127614" destination="synapses" segmentId="0" fractionAlong="0.5"/>
        </inputList>
        <inputList id="Stim_75" population="popExc" component="pg_75">
            <input id="0" target="../popExc/75/HH_477127614" destination="synapses" segmentId="0" fractionAlong="0.5"/>
        </inputList>
        <inputList id="Stim_76" population="popExc" component="pg_76">
            <input id="0" target="../popExc/76/HH_477127614" destination="synapses" segmentId="0" fractionAlong="0.5"/>
        </inputList>
        <inputList id="Stim_77" population="popExc" component="pg_77">
            <input id="0" target="../popExc/77/HH_477127614" destination="synapses" segmentId="0" fractionAlong="0.5"/>
        </inputList>
        <inputList id="Stim_78" population="popExc" component="pg_78">
            <input id="0" target="../popExc/78/HH_477127614" destination="synapses" segmentId="0" fractionAlong="0.5"/>
        </inputList>
        <inputList id="Stim_79" population="popExc" component="pg_79">
            <input id="0" target="../popExc/79/HH_477127614" destination="synapses" segmentId="0" fractionAlong="0.5"/>
        </inputList>
    </network>
</neuroml>
