<Lems>

    <!--

        This LEMS file has been automatically generated using PyNeuroML v0.3.0 (libNeuroML v0.2.32)

     -->

    <!-- Specify which component to run -->
    <Target component="Sim_SpikingNet"/>

    <!-- Include core NeuroML2 ComponentType definitions -->
    <Include file="Cells.xml"/>
    <Include file="Networks.xml"/>
    <Include file="Simulation.xml"/>

    <Include file="SpikingNet/RS.cell.nml"/>
    <Include file="SpikingNet.net.nml"/>

    <Simulation id="Sim_SpikingNet" length="2000ms" step="0.01ms" target="SpikingNet" seed="12345">  <!-- Note seed: ensures same random numbers used every run -->

        <Display id="DispPop__pop_pre" title="Membrane potentials of cells in pop_pre" timeScale="1ms" xmin="-500.0" xmax="2500.0" ymin="-90" ymax="50">
            <Line id="pop_pre[0]: v" quantity="pop_pre/0/RS/v" scale="1mV" color="#6aa799" timeScale="1ms"/>
            <Line id="pop_pre[1]: v" quantity="pop_pre/1/RS/v" scale="1mV" color="#029a72" timeScale="1ms"/>
            <Line id="pop_pre[2]: v" quantity="pop_pre/2/RS/v" scale="1mV" color="#aaaaaa" timeScale="1ms"/>
            <Line id="pop_pre[3]: v" quantity="pop_pre/3/RS/v" scale="1mV" color="#aa33ff" timeScale="1ms"/>
            <Line id="pop_pre[4]: v" quantity="pop_pre/4/RS/v" scale="1mV" color="#7711cc" timeScale="1ms"/>
        </Display>

        <Display id="DispPop__pop_post" title="Membrane potentials of cells in pop_post" timeScale="1ms" xmin="-500.0" xmax="2500.0" ymin="-90" ymax="50">
            <Line id="pop_post[0]: v" quantity="pop_post/0/RS/v" scale="1mV" color="#4c73a9" timeScale="1ms"/>
            <Line id="pop_post[1]: v" quantity="pop_post/1/RS/v" scale="1mV" color="#5e503a" timeScale="1ms"/>
            <Line id="pop_post[2]: v" quantity="pop_post/2/RS/v" scale="1mV" color="#222222" timeScale="1ms"/>
            <Line id="pop_post[3]: v" quantity="pop_post/3/RS/v" scale="1mV" color="#3333ff" timeScale="1ms"/>
            <Line id="pop_post[4]: v" quantity="pop_post/4/RS/v" scale="1mV" color="#224444" timeScale="1ms"/>
        </Display>

        <OutputFile id="Volts_file__pop_pre" fileName="Sim_SpikingNet.pop_pre.v.dat">
            <OutputColumn id="v_pop_pre_0_RS_v" quantity="pop_pre/0/RS/v"/>
            <OutputColumn id="v_pop_pre_1_RS_v" quantity="pop_pre/1/RS/v"/>
            <OutputColumn id="v_pop_pre_2_RS_v" quantity="pop_pre/2/RS/v"/>
            <OutputColumn id="v_pop_pre_3_RS_v" quantity="pop_pre/3/RS/v"/>
            <OutputColumn id="v_pop_pre_4_RS_v" quantity="pop_pre/4/RS/v"/>
        </OutputFile>

        <OutputFile id="Volts_file__pop_post" fileName="Sim_SpikingNet.pop_post.v.dat">
            <OutputColumn id="v_pop_post_0_RS_v" quantity="pop_post/0/RS/v"/>
            <OutputColumn id="v_pop_post_1_RS_v" quantity="pop_post/1/RS/v"/>
            <OutputColumn id="v_pop_post_2_RS_v" quantity="pop_post/2/RS/v"/>
            <OutputColumn id="v_pop_post_3_RS_v" quantity="pop_post/3/RS/v"/>
            <OutputColumn id="v_pop_post_4_RS_v" quantity="pop_post/4/RS/v"/>
        </OutputFile>

    </Simulation>

</Lems>
